# OpenSim document version 30000
# Reserve actuators for LEFT-leg COMAK simulation (bilateral model).
# Includes secondary-coord actuators for LEFT TF+PF only.
# Right TF/PF secondary coords are prescribed in this simulation → no actuators needed.
ForceSet gait2354_CMC:
  defaults: CoordinateActuator: optimal_force=1
  # Pelvis (6)
  CoordinateActuator pelvis_tilt_reserve: coordinate=pelvis_tilt optimal_force=1
  CoordinateActuator pelvis_list_reserve: coordinate=pelvis_list optimal_force=1
  CoordinateActuator pelvis_rot_reserve: coordinate=pelvis_rot optimal_force=1
  CoordinateActuator pelvis_tx_reserve: coordinate=pelvis_tx optimal_force=1
  CoordinateActuator pelvis_ty_reserve: coordinate=pelvis_ty optimal_force=1
  CoordinateActuator pelvis_tz_reserve: coordinate=pelvis_tz optimal_force=1
  # Right hip primary (3) — prescribed, kept for residual stability
  CoordinateActuator hip_flex_r_reserve: coordinate=hip_flex_r optimal_force=1
  CoordinateActuator hip_add_r_reserve: coordinate=hip_add_r optimal_force=1
  CoordinateActuator hip_rot_r_reserve: coordinate=hip_rot_r optimal_force=1
  # NOTE: Right TF/PF secondary coords are PRESCRIBED in left-leg simulation.
  # No reserve actuators needed for them.
  # Right knee / ankle (prescribed)
  CoordinateActuator knee_flex_r_reserve: coordinate=knee_flex_r optimal_force=1
  CoordinateActuator ankle_flex_r_reserve: coordinate=ankle_flex_r optimal_force=1
  CoordinateActuator subt_angle_r_reserve: coordinate=subt_angle_r optimal_force=1
  CoordinateActuator mtp_angle_r_reserve: coordinate=mtp_angle_r optimal_force=1
  # Left hip primary (3) — OPTIMIZED
  CoordinateActuator hip_flex_l_reserve: coordinate=hip_flex_l optimal_force=1
  CoordinateActuator hip_add_l_reserve: coordinate=hip_add_l optimal_force=1
  CoordinateActuator hip_rot_l_reserve: coordinate=hip_rot_l optimal_force=1
  # Left PF secondary (6) — OPTIMIZED
  CoordinateActuator pf_flex_l_reserve: coordinate=pf_flex_l optimal_force=1
  CoordinateActuator pf_rot_l_reserve: coordinate=pf_rot_l optimal_force=1
  CoordinateActuator pf_tilt_l_reserve: coordinate=pf_tilt_l optimal_force=1
  CoordinateActuator pf_tx_l_reserve: coordinate=pf_tx_l optimal_force=1
  CoordinateActuator pf_ty_l_reserve: coordinate=pf_ty_l optimal_force=1
  CoordinateActuator pf_tz_l_reserve: coordinate=pf_tz_l optimal_force=1
  # Left knee primary + TF secondary (6) — OPTIMIZED
  CoordinateActuator knee_flex_l_reserve: coordinate=knee_flex_l optimal_force=1
  CoordinateActuator knee_add_l_reserve: coordinate=knee_add_l optimal_force=1
  CoordinateActuator knee_rot_l_reserve: coordinate=knee_rot_l optimal_force=1
  CoordinateActuator knee_tx_l_reserve: coordinate=knee_tx_l optimal_force=1
  CoordinateActuator knee_ty_l_reserve: coordinate=knee_ty_l optimal_force=1
  CoordinateActuator knee_tz_l_reserve: coordinate=knee_tz_l optimal_force=1
  # Left ankle / foot
  CoordinateActuator ankle_flex_l_reserve: coordinate=ankle_flex_l optimal_force=1
  CoordinateActuator subt_angle_l_reserve: coordinate=subt_angle_l optimal_force=1
  CoordinateActuator mtp_angle_l_reserve: coordinate=mtp_angle_l optimal_force=1
  # Lumbar / neck (6)
  CoordinateActuator lumbar_ext_reserve: coordinate=lumbar_ext optimal_force=1
  CoordinateActuator lumbar_latbend_reserve: coordinate=lumbar_latbend optimal_force=1
  CoordinateActuator lumbar_rot_reserve: coordinate=lumbar_rot optimal_force=1
  CoordinateActuator neck_ext_reserve: coordinate=neck_ext optimal_force=1
  CoordinateActuator neck_latbend_reserve: coordinate=neck_latbend optimal_force=1
  CoordinateActuator neck_rot_reserve: coordinate=neck_rot optimal_force=1
  # Arms right (6)
  CoordinateActuator arm_add_r_reserve: coordinate=arm_add_r optimal_force=1
  CoordinateActuator arm_flex_r_reserve: coordinate=arm_flex_r optimal_force=1
  CoordinateActuator arm_rot_r_reserve: coordinate=arm_rot_r optimal_force=1
  CoordinateActuator elbow_flex_r_reserve: coordinate=elbow_flex_r optimal_force=1
  CoordinateActuator pro_sup_r_reserve: coordinate=pro_sup_r optimal_force=1
  CoordinateActuator wrist_flex_r_reserve: coordinate=wrist_flex_r optimal_force=1
  # Arms left (6)
  CoordinateActuator arm_add_l_reserve: coordinate=arm_add_l optimal_force=1
  CoordinateActuator arm_flex_l_reserve: coordinate=arm_flex_l optimal_force=1
  CoordinateActuator arm_rot_l_reserve: coordinate=arm_rot_l optimal_force=1
  CoordinateActuator elbow_flex_l_reserve: coordinate=elbow_flex_l optimal_force=1
  CoordinateActuator pro_sup_l_reserve: coordinate=pro_sup_l optimal_force=1
  CoordinateActuator wrist_flex_l_reserve: coordinate=wrist_flex_l optimal_force=1
