# OpenSim document version 40000
Model lenhart2015-scaled:
  gravity: 0 -9.80665 0
  length_units: m
  force_units: N
  credits:
    Lenhart, R. L., Kaiser, J., Smith, C. R., Thelen, D. G. Details of the model development are listed in the publication. A knee model with 6 DOF tibiofemoral and patellofemoral joints was built from MRI. Ligaments and cartilage contact are explicitly represented with force components. The knee model is integrated into a full body model based on the Arnold, Ann Biomed Eng, 2011 model. Some modifications to the lower extremity muscle paths and properties were made to improve computaitonal performance and enable simulations of dynamic tasks. In the SIMM to OpenSim conversion, the two patella frames were replaced with a single frame located at the patella COM.
  publications:
    Lenhart, R. L., Kaiser, J., Smith, C. R., Thelen, D. G. (2015). Prediction and validation of load-dependent behavior of the tibiofemoral and patellofemoral joints during movement. Annals of biomedical engineering, 43(11), 2675-2685.
  Ground
  BodySet:
    Body pelvis: mass=8.494436 [kg] mass_center=(-0.0949957 -0.02433617 0)
        inertia=(0.04332182 0.04916781 0.05396913 0 0 0) meshes=(pelvis.vtp pelvflip.vtp sacrum.vtp)
      WrapEllipsoid PS_at_brim_r: translation=(-0.08488978 -0.06169893 0.06978408) quadrant=all
          dimensions=(0.0553167 0.0464157 0.0755285)
      WrapEllipsoid IL_at_brim_r: translation=(-0.07286904 -0.05254787 0.08042189) quadrant=all
          dimensions=(0.0584017 0.0627367 0.0755285)
      WrapEllipsoid Gmax_at_pelvis_r: xyz_body_rotation=(-0.637045 0.383623 -0.684867)
          translation=(-0.08457064 -0.07783123 0.07074148) quadrant=all dimensions=(0.0403902 0.0414836 0.061719)
      WrapEllipsoid PS_at_brim_l: translation=(-0.08488978 -0.06169893 -0.06978408) quadrant=all
          dimensions=(0.0553167 0.0464157 0.0755285)
      WrapEllipsoid IL_at_brim_l: translation=(-0.07286904 -0.05254787 -0.08042189) quadrant=all
          dimensions=(0.0584017 0.0627367 0.0755285)
      WrapEllipsoid Gmax_at_pelvis_l: xyz_body_rotation=(0.637045 -0.383623 -0.684867)
          translation=(-0.08457064 -0.07783123 -0.07074148) quadrant=all dimensions=(0.0403902 0.0414836 0.061719)
    Body femur_r: mass=10.27393 mass_center=(0 -0.1418667 0) inertia=(0.1334691 0.0273755 0.1334691 0 0 0)
      WrapEllipsoid AB_at_femshaft_r: xyz_body_rotation=(0.111701 0 0.176278)
          translation=(0.0127737 -0.1024986 0.02228144) quadrant=all dimensions=(0.0144349 0.0612392 0.0183718)
      WrapEllipsoid AL_at_femshaft_r: xyz_body_rotation=(0.111701 0 0.0541052)
          translation=(0.02700411 -0.2082045 0.01042457) quadrant=all dimensions=(0.0175844 0.0874845 0.0157472)
      WrapEllipsoid AMprox_at_femshaft_r: xyz_body_rotation=(0.111701 0 0.211185)
          translation=(0.005280934 -0.06788599 0.02616383) quadrant=all dimensions=(0.0184592 0.0612392 0.0279951)
      WrapEllipsoid AMmid_at_femshaft_r: xyz_body_rotation=(0.111701 0 0.123918)
          translation=(0.02013238 -0.1405973 0.01800799) quadrant=all dimensions=(0.0187217 0.104981 0.0271202)
      WrapEllipsoid AMdist_at_femshaft_r: xyz_body_rotation=(0.111701 0 0.176278)
          translation=(0.02686396 -0.2281326 0.008189358) quadrant=all dimensions=(0.0190717 0.174969 0.0188092)
      WrapEllipsoid AMisch_at_condyles_r: xyz_body_rotation=(0.111701 0 -0.434587)
          translation=(-0.02506178 -0.3298106 -0.003215722) quadrant=all dimensions=(0.0437423 0.209963 0.0351688)
      WrapEllipsoid PECT_at_femshaft_r: xyz_body_rotation=(0.111701 0 0.211185)
          translation=(0.00666752 -0.07462125 0.0254084) quadrant=all dimensions=(0.0145224 0.0437423 0.0114605)
      WrapCylinder KnExt_at_fem_r: translation=(0.008748454 -0.3473136 0) quadrant=x radius=0.02449567 length=0.1749691
      WrapCylinder KnExt_vasint_at_fem_r: translation=(0.008748454 -0.3473136 0) quadrant=x radius=0.02274598
          length=0.1749691
      WrapEllipsoid Gastroc_at_Condyles_r: xyz_body_rotation=(0.0589921 -0.0872665 0.0232129)
          translation=(0.008748454 -0.3564995 0.0002624536) quadrant=all dimensions=(0.0262454 0.0218712 0.131227)
    Body femur_distal_r: mass=0.01013958 mass_center=(0 0 0) inertia=(0.0009065552 0.0009065552 0.0009065552 0 0 0)
        meshes=(lenhart2015-R-femur-bone.stl lenhart2015-R-femur-cartilage.stl)
      WrapCylinder Capsule_r: xyz_body_rotation=(-0.0299066 0.02 0.331613) translation=(-0.003782222 -0.002836667 0)
          quadrant=all radius=0.01702 length=0.4727778
    Body patella_r: mass=0.4943047 mass_center=(0 0 0) inertia=(1.450488e-5 6.708508e-5 6.708508e-5 0 0 0)
        meshes=(lenhart2015-R-patella-bone.stl lenhart2015-R-patella-cartilage.stl)
      WrapEllipsoid PatTen_r: xyz_body_rotation=(0 0 0.01) translation=(0.0004727778 -0.008878041 0.0004560698)
          quadrant=all dimensions=(0.00472778 0.00756444 0.0113467)
    Body tibia_proximal_r: mass=0.01013958 mass_center=(0 0 0) inertia=(0.0009065552 0.0009065552 0.0009065552 0 0 0)
        meshes=(lenhart2015-R-tibia-bone.stl lenhart2015-R-tibia-cartilage.stl lenhart2015-R-fibula-bone.stl)
      WrapEllipsoid Med_Lig_r: xyz_body_rotation=(-0.104907 -0.0349066 0.181613)
          translation=(0.0009455556 -0.03271622 -0.01768189) quadrant=all dimensions=(0.0283667 0.01702 0.0113467)
      WrapEllipsoid Med_LigP_r: xyz_body_rotation=(-0.139813 0.349066 0.181613)
          translation=(-0.009833778 -0.02969044 -0.02146411) quadrant=all dimensions=(0.0236389 0.005106 0.00501144)
    Body tibia_r: mass=3.29283 mass_center=(0 -0.1637064 0) inertia=(0.02764725 0.004752721 0.02878267 0 0 0)
      WrapEllipsoid GR_at_condyles_r: xyz_body_rotation=(0 0 -0.18326) translation=(0 0 0) quadrant=all
          dimensions=(0.0343214 0.0605391 0.0508147)
      WrapEllipsoid SM_at_condyles_r: xyz_body_rotation=(0 0 -0.296706) translation=(0 0 0) quadrant=all
          dimensions=(0.0335587 0.057393 0.0466199)
      WrapEllipsoid ST_at_condyles_r: xyz_body_rotation=(0 0 -0.270526) translation=(0 0 0) quadrant=all
          dimensions=(0.0405183 0.0657827 0.0545329)
      WrapCylinder BFLH_at_gastroc_r: translation=(-0.03012656 -0.04223439 0) quadrant=y radius=0.009533723
          length=0.09533723
      WrapCylinder Gastroc_at_Shank_r: xyz_body_rotation=(2.96723 0.0289725 -1.47812)
          translation=(-0.007054955 -0.07054955 -0.003146129) quadrant=-y radius=0.05243548 length=0.09533723
    Body talus_r: mass=0.04562813 mass_center=(0.006025885 0.002519916 0)
        inertia=(3.651386e-6 1.217129e-6 3.651386e-6 0 0 0) meshes=talus_rv.vtp
    Body calcn_r: mass=1.252239 mass_center=(0.1116049 0.0170916 0) inertia=(0.001544536 0.003930108 0.00455693 0 0 0)
        meshes=(calcaneous_rv.vtp navicular_rv.vtp cuboid_rv.vtp first_cuneiform_rv.vtp second_cuneiform_rv.vtp third_cuneiform_rv.vtp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)
    Body toes_r: mass=0.2002568 mass_center=(0.0336354 -0.0028486 0.01150396)
        inertia=(0.00024586 0.0006292555 0.0007241915 0 0 0)
        meshes=(prox_phalanx1_rvs.vtp prox_phalanx2_rvs.vtp prox_phalanx3_rvs.vtp prox_phalanx4_rvs.vtp prox_phalanx5_rvs.vtp mid_phalanx2_rvs.vtp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)
    Body femur_l: mass=10.27393 mass_center=(0 -0.1462985 0) inertia=(0.1419384 0.02911262 0.1419384 0 0 0)
        meshes=femur_l.vtp
      WrapEllipsoid AB_at_femshaft_l: xyz_body_rotation=(-0.111701 0 0.176278)
          translation=(0.01317275 -0.1057007 -0.0229775) quadrant=all dimensions=(0.0148859 0.0631523 0.0189457)
      WrapEllipsoid AL_at_femshaft_l: xyz_body_rotation=(-0.111701 0 0.0541052)
          translation=(0.02784771 -0.2147087 -0.01075023) quadrant=all dimensions=(0.0181337 0.0902175 0.0162391)
      WrapEllipsoid AMprox_at_femshaft_l: xyz_body_rotation=(-0.111701 0 0.211185)
          translation=(0.005445908 -0.07000672 -0.02698117) quadrant=all dimensions=(0.0190359 0.0631523 0.0288696)
      WrapEllipsoid AMmid_at_femshaft_l: xyz_body_rotation=(-0.111701 0 0.123918)
          translation=(0.02076131 -0.1449895 -0.01857055) quadrant=all dimensions=(0.0193066 0.108261 0.0279675)
      WrapEllipsoid AMdist_at_femshaft_l: xyz_body_rotation=(-0.111701 0 0.176278)
          translation=(0.02770318 -0.2352593 -0.00844519) quadrant=all dimensions=(0.0196675 0.180435 0.0193968)
      WrapEllipsoid AMisch_at_condyles_l: xyz_body_rotation=(-0.111701 0 -0.434587)
          translation=(-0.0258447 -0.3401137 0.00331618) quadrant=all dimensions=(0.0451087 0.216522 0.0362675)
      WrapEllipsoid PECT_at_femshaft_l: xyz_body_rotation=(-0.111701 0 0.211185)
          translation=(0.006875811 -0.07695239 -0.02620215) quadrant=all dimensions=(0.0149761 0.0451087 0.0118185)
      WrapCylinder KnExt_at_fem_l: xyz_body_rotation=(0.0623371 -0.0507601 -0.892533)
          translation=(0.003237257 -0.3633348 -0.001886548) quadrant=all radius=0.02255438 length=0.09021752
      WrapEllipsoid Gastroc_at_Condyles_l: xyz_body_rotation=(-0.0589921 0.0937242 0.0232129)
          translation=(0.004330441 -0.3676364 -0.0002706526) quadrant=all dimensions=(0.0270653 0.0225544 0.0451087)
      WrapCylinder KnExt_vasint_at_fem_l: translation=(0.009021752 -0.3581636 0) quadrant=x radius=0.02345656
          length=0.180435
    Body femur_distal_l: mass=0.01013958 mass_center=(0 0 0) inertia=(0.0009640808 0.0009640808 0.0009640808 0 0 0)
        meshes=(lenhart2015-L-femur-bone.stl lenhart2015-L-femur-cartilage.stl)
      WrapCylinder Capsule_l: xyz_body_rotation=(-0.0299066 0.02 0.331613) translation=(-0.003900377 -0.002925283 0)
          quadrant=all radius=0.0175517 length=0.4875472
    Body patella_l: mass=0.4943047 mass_center=(0 0 0) inertia=(1.542529e-5 7.134198e-5 7.134198e-5 0 0 0)
        meshes=(lenhart2015-L-patella-bone.stl lenhart2015-L-patella-cartilage.stl)
      WrapEllipsoid PatTen_l: xyz_body_rotation=(0 0 0.01) translation=(0.0004875472 -0.009155387 -0.0004703173)
          quadrant=all dimensions=(0.00487547 0.00780075 0.0117011)
    Body tibia_proximal_l: mass=0.01013958 mass_center=(0 0 0) inertia=(0.0009640808 0.0009640808 0.0009640808 0 0 0)
        meshes=(lenhart2015-L-tibia-bone.stl lenhart2015-R-tibia-cartilage.stl lenhart2015-L-fibula-bone.stl)
      WrapEllipsoid Med_Lig_l: xyz_body_rotation=(-0.104907 -0.0349066 0.181613)
          translation=(0.0009750944 -0.03373826 0.01823426) quadrant=all dimensions=(0.0292528 0.0175517 0.0117011)
      WrapEllipsoid Med_LigP_l: xyz_body_rotation=(-0.139813 0.349066 0.181613)
          translation=(-0.01014098 -0.03061796 0.02213464) quadrant=all dimensions=(0.0243774 0.00526551 0.005168)
    Body tibia_l: mass=3.29283 mass_center=(0 -0.1688205 0) inertia=(0.02940161 0.005054306 0.03060908 0 0 0)
        meshes=(tibia_l.vtp fibula_l.vtp)
      WrapEllipsoid GR_at_condyles_l: xyz_body_rotation=(0 0 -0.18326) translation=(0 0 0) quadrant=all
          dimensions=(0.0353936 0.0624303 0.0524022)
      WrapEllipsoid SM_at_condyles_l: xyz_body_rotation=(0 0 -0.296706) translation=(0 0 0) quadrant=all
          dimensions=(0.0346071 0.059186 0.0480762)
      WrapEllipsoid ST_at_condyles_l: xyz_body_rotation=(0 0 -0.270526) translation=(0 0 0) quadrant=all
          dimensions=(0.0417841 0.0678377 0.0562365)
      WrapCylinder BFLH_at_gastroc_l: translation=(-0.03106771 -0.04355378 0) quadrant=y radius=0.009831553
          length=0.09831553
      WrapCylinder Gastroc_at_Shank_l: xyz_body_rotation=(-2.96723 -0.0289725 -1.47812)
          translation=(-0.007275349 -0.07275349 0.003244412) quadrant=-y radius=0.05407354 length=0.09831553
    Body talus_l: mass=0.04562813 mass_center=(0.005757473 0.002407671 0)
        inertia=(3.333342e-6 1.111114e-6 3.333342e-6 0 0 0) meshes=talus_lv.vtp
    Body calcn_l: mass=1.252239 mass_center=(0.1066336 0.01633029 0)
        inertia=(0.001410004 0.003587787 0.004160011 0 0 0)
        meshes=(calcaneous_lv.vtp navicular_lv.vtp cuboid_lv.vtp first_cuneiform_lv.vtp second_cuneiform_lv.vtp third_cuneiform_lv.vtp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)
    Body toes_l: mass=0.2002568 mass_center=(0.03213717 -0.002721715 -0.01099154)
        inertia=(0.000224445 0.0005744459 0.0006611128 0 0 0)
        meshes=(prox_phalanx1_lvs.vtp prox_phalanx2_lvs.vtp prox_phalanx3_lvs.vtp prox_phalanx4_lvs.vtp prox_phalanx5_lvs.vtp mid_phalanx2_lvs.vtp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)
    Body torso: mass=24.55554 mass_center=(0 0.1825912 0) inertia=(0.3536971 0.222151 0.4786165 0 0 0)
        meshes=(lumbar1sm.vtp lumbar2sm.vtp lumbar3sm.vtp lumbar4sm.vtp lumbar5.vtp ribcage_s.vtp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)
    Body neckhead: mass=5.277653 mass_center=(0.02050642 0.1149933 0) inertia=(0.01566397 0.01075417 0.01449396 0 0 0)
        meshes=(cerv1sm.vtp cerv2sm.vtp cerv3sm.vtp cerv4sm.vtp cerv5sm.vtp cerv6sm.vtp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)
    Body humerus_r: mass=2.06087 mass_center=(0 -0.1345663 0) inertia=(0.008105365 0.0027961 0.009098011 0 0 0)
        meshes=humerus_rv.vtp
    Body ulna_r: mass=0.6159797 mass_center=(0 -0.0900487 0) inertia=(0.001676509 0.0003497915 0.001818576 0 0 0)
        meshes=ulna_rv.vtp
    Body radius_r: mass=0.6159797 mass_center=(0 -0.0900487 0) inertia=(0.001676509 0.0003497915 0.001818576 0 0 0)
        meshes=radius_rv.vtp
    Body hand_r: mass=0.463886 mass_center=(0 -0.0508763 0) inertia=(0.0005048771 0.0003096051 0.0007584476 0 0 0)
        meshes=(pisiform_rvs.vtp lunate_rvs.vtp scaphoid_rvs.vtp triquetrum_rvs.vtp hamate_rvs.vtp capitate_rvs.vtp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)
    Body humerus_l: mass=2.06087 mass_center=(0 -0.1345663 0) inertia=(0.008105365 0.0027961 0.009098011 0 0 0)
        meshes=humerus_lv.vtp
    Body ulna_l: mass=0.6159797 mass_center=(0 -0.0900487 0) inertia=(0.001676509 0.0003497915 0.001818576 0 0 0)
        meshes=ulna_lv.vtp
    Body radius_l: mass=0.6159797 mass_center=(0 -0.0900487 0) inertia=(0.001676509 0.0003497915 0.001818576 0 0 0)
        meshes=radius_lv.vtp
    Body hand_l: mass=0.463886 mass_center=(0 -0.0508763 0) inertia=(0.0005048771 0.0003096051 0.0007584476 0 0 0)
        meshes=(pisiform_lvs.vtp lunate_lvs.vtp scaphoid_lvs.vtp triquetrum_lvs.vtp hamate_lvs.vtp capitate_lvs.vtp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)
  JointSet:
    CustomJoint gnd_pelvis: socket_parent_frame=/ground socket_child_frame=/bodyset/pelvis
      Coordinate pelvis_tilt: default_value=0 range=(-4.712389 4.712389) clamped=false
      Coordinate pelvis_list: default_value=0 range=(-4.712389 4.712389) clamped=false
      Coordinate pelvis_rot: default_value=0 range=(-4.712389 4.712389) clamped=false
      Coordinate pelvis_tx: default_value=0 range=(-10 10) clamped=false
      Coordinate pelvis_ty: default_value=0.969 range=(-10 10) clamped=false
      Coordinate pelvis_tz: default_value=0 range=(-10 10) clamped=false
      SpatialTransform:
        TransformAxis rotation1: coordinates=pelvis_tilt axis=(0 0 1) LinearFunction(coefficients=1 0)
        TransformAxis rotation2: coordinates=pelvis_list axis=(1 0 0) LinearFunction(coefficients=1 0)
        TransformAxis rotation3: coordinates=pelvis_rot axis=(0 1 0) LinearFunction(coefficients=1 0)
        TransformAxis translation1: coordinates=pelvis_tx axis=(1 0 0) LinearFunction(coefficients=1 0)
        TransformAxis translation2: coordinates=pelvis_ty axis=(0 1 0) LinearFunction(coefficients=1 0)
        TransformAxis translation3: coordinates=pelvis_tz axis=(0 0 1) LinearFunction(coefficients=1 0)
    CustomJoint hip_r: socket_parent_frame=pelvis_offset socket_child_frame=/bodyset/femur_r
      Coordinate hip_flex_r: default_value=0 range=(-1.047198 2.617994) clamped=true
      Coordinate hip_add_r: default_value=0 range=(-1.047198 1.047198) clamped=true
      Coordinate hip_rot_r: default_value=0 range=(-1.047198 1.047198) clamped=true
      PhysicalOffsetFrame pelvis_offset: socket_parent=/bodyset/pelvis
          translation=(-0.05986538 -0.07404816 0.08218777) [meters]
      SpatialTransform: axes_held_at_zero=(translation1 translation2 translation3)
        TransformAxis rotation1: coordinates=hip_flex_r axis=(0 0 1) LinearFunction(coefficients=1 0)
        TransformAxis rotation2: coordinates=hip_add_r axis=(1 0 0) LinearFunction(coefficients=1 0)
        TransformAxis rotation3: coordinates=hip_rot_r axis=(0 1 0) LinearFunction(coefficients=1 0)
    WeldJoint femur_femur_distal_r: socket_parent_frame=femur_r_offset socket_child_frame=/bodyset/femur_distal_r
      PhysicalOffsetFrame femur_r_offset: socket_parent=/bodyset/femur_r
          translation=(-0.005249116 -0.3538093 -0.001106889)
    CustomJoint pf_r: socket_parent_frame=/bodyset/femur_distal_r socket_child_frame=/bodyset/patella_r
      Coordinate pf_flex_r: default_value=0 range=(-1.570796 1.570796) clamped=true
      Coordinate pf_rot_r: default_value=0 range=(-1.570796 1.570796) clamped=true
      Coordinate pf_tilt_r: default_value=0 range=(-0.8726646 0.8726646) clamped=true
      Coordinate pf_tx_r: default_value=0.053 range=(-0.2 0.2) clamped=true
      Coordinate pf_ty_r: default_value=0.005 range=(-0.2 0.2) clamped=true
      Coordinate pf_tz_r: default_value=0.004 range=(-0.2 0.2) clamped=true
      SpatialTransform:
        TransformAxis rotation1: coordinates=pf_flex_r axis=(0 0 1) LinearFunction(coefficients=-1 0)
        TransformAxis rotation2: coordinates=pf_rot_r axis=(1 0 0) LinearFunction(coefficients=1 0)
        TransformAxis rotation3: coordinates=pf_tilt_r axis=(0 1 0) LinearFunction(coefficients=1 0)
        TransformAxis translation1: coordinates=pf_tx_r axis=(1 0 0) LinearFunction(coefficients=1 0)
        TransformAxis translation2: coordinates=pf_ty_r axis=(0 1 0) LinearFunction(coefficients=1 0)
        TransformAxis translation3: coordinates=pf_tz_r axis=(0 0 1) LinearFunction(coefficients=1 0)
    CustomJoint knee_r: socket_parent_frame=/bodyset/femur_distal_r socket_child_frame=/bodyset/tibia_proximal_r
      Coordinate knee_flex_r: default_value=0 range=(-0.1745329 2.792527) clamped=true
      Coordinate knee_add_r: default_value=0 range=(-0.8726646 0.8726646) clamped=true
      Coordinate knee_rot_r: default_value=0 range=(-0.8726646 0.8726646) clamped=true
      Coordinate knee_tx_r: default_value=0 range=(-0.2 0.2) clamped=true
      Coordinate knee_ty_r: default_value=0 range=(-0.2 0.2) clamped=true
      Coordinate knee_tz_r: default_value=0 range=(-0.2 0.2) clamped=true
      SpatialTransform:
        TransformAxis rotation1: coordinates=knee_flex_r axis=(0 0 1) LinearFunction(coefficients=-1 0)
        TransformAxis rotation2: coordinates=knee_add_r axis=(1 0 0) LinearFunction(coefficients=1 0)
        TransformAxis rotation3: coordinates=knee_rot_r axis=(0 1 0) LinearFunction(coefficients=1 0)
        TransformAxis translation1: coordinates=knee_tx_r axis=(1 0 0) LinearFunction(coefficients=1 0)
        TransformAxis translation2: coordinates=knee_ty_r axis=(0 1 0) LinearFunction(coefficients=1 0)
        TransformAxis translation3: coordinates=knee_tz_r axis=(0 0 1) LinearFunction(coefficients=1 0)
    WeldJoint tibia_tibia_proximal_r: socket_parent_frame=tibia_proximal_r_offset socket_child_frame=/bodyset/tibia_r
      PhysicalOffsetFrame tibia_proximal_r_offset: socket_parent=/bodyset/tibia_proximal_r
          translation=(0.005673333 0 0)
    CustomJoint ankle_r: socket_parent_frame=tibia_r_offset socket_child_frame=/bodyset/talus_r
      Coordinate ankle_flex_r: default_value=0 range=(-1.570796 1.570796) clamped=true
      PhysicalOffsetFrame tibia_r_offset: socket_parent=/bodyset/tibia_r translation=(-0.009533723 -0.3813489 0)
      SpatialTransform: axes_held_at_zero=(rotation2 rotation3 translation1 translation2 translation3)
        TransformAxis rotation1: coordinates=ankle_flex_r axis=(-0.105014 -0.1740221 0.9791263)
            LinearFunction(coefficients=1 0)
    CustomJoint subtalar_r: socket_parent_frame=talus_r_offset socket_child_frame=/bodyset/calcn_r
      Coordinate subt_angle_r: default_value=0 range=(-1.047198 1.047198) clamped=true
      PhysicalOffsetFrame talus_r_offset: socket_parent=/bodyset/talus_r
          translation=(-0.05343317 -0.04596107 0.008677275)
      SpatialTransform: axes_held_at_zero=(rotation2 rotation3 translation1 translation2 translation3)
        TransformAxis rotation1: coordinates=subt_angle_r axis=(0.78718 0.604747 -0.120949)
            LinearFunction(coefficients=1 0)
    CustomJoint mtp_r: socket_parent_frame=calcn_r_offset socket_child_frame=/bodyset/toes_r
      Coordinate mtp_angle_r: default_value=0 range=(-1.047198 1.047198) clamped=true
      PhysicalOffsetFrame calcn_r_offset: socket_parent=/bodyset/calcn_r
          translation=(0.1958961 -0.002191231 0.001183265)
      SpatialTransform: axes_held_at_zero=(rotation2 rotation3 translation1 translation2 translation3)
        TransformAxis rotation1: coordinates=mtp_angle_r axis=(0.5809542 0 -0.8139363) LinearFunction(coefficients=1 0)
    CustomJoint hip_l: socket_parent_frame=pelvis_offset socket_child_frame=/bodyset/femur_l
      Coordinate hip_flex_l: default_value=0 range=(-1.047198 2.617994) clamped=true
      Coordinate hip_add_l: default_value=0 range=(-1.047198 0.3490659) clamped=true
      Coordinate hip_rot_l: default_value=0 range=(-1.047198 1.047198) clamped=true
      PhysicalOffsetFrame pelvis_offset: socket_parent=/bodyset/pelvis
          translation=(-0.05986538 -0.07404816 -0.08218777)
      SpatialTransform: axes_held_at_zero=(translation1 translation2 translation3)
        TransformAxis rotation1: coordinates=hip_flex_l axis=(0 0 1) LinearFunction(coefficients=1 0)
        TransformAxis rotation2: coordinates=hip_add_l axis=(1 0 0) LinearFunction(coefficients=1 0)
        TransformAxis rotation3: coordinates=hip_rot_l axis=(0 1 0) LinearFunction(coefficients=1 0)
    WeldJoint femur_femur_distal_l: socket_parent_frame=femur_l_offset socket_child_frame=/bodyset/femur_distal_l
      PhysicalOffsetFrame femur_l_offset: socket_parent=/bodyset/femur_l
          translation=(-0.005413096 -0.3648622 0.001141468)
    CustomJoint pf_l: socket_parent_frame=/bodyset/femur_distal_l socket_child_frame=/bodyset/patella_l
      Coordinate pf_flex_l: default_value=0 range=(-1.570796 1.570796) clamped=true
      Coordinate pf_rot_l: default_value=0 range=(-1.570796 1.570796) clamped=true
      Coordinate pf_tilt_l: default_value=0 range=(-0.8726646 0.8726646) clamped=true
      Coordinate pf_tx_l: default_value=0.053 range=(-0.2 0.2) clamped=true
      Coordinate pf_ty_l: default_value=0.005 range=(-0.2 0.2) clamped=true
      Coordinate pf_tz_l: default_value=-0.004 range=(-0.2 0.2) clamped=true
      SpatialTransform:
        TransformAxis rotation1: coordinates=pf_flex_l axis=(0 0 1) LinearFunction(coefficients=1 0)
        TransformAxis rotation2: coordinates=pf_rot_l axis=(1 0 0) LinearFunction(coefficients=1 0)
        TransformAxis rotation3: coordinates=pf_tilt_l axis=(0 1 0) LinearFunction(coefficients=1 0)
        TransformAxis translation1: coordinates=pf_tx_l axis=(1 0 0) LinearFunction(coefficients=1 0)
        TransformAxis translation2: coordinates=pf_ty_l axis=(0 1 0) LinearFunction(coefficients=1 0)
        TransformAxis translation3: coordinates=pf_tz_l axis=(0 0 1) LinearFunction(coefficients=1 0)
    CustomJoint knee_l: socket_parent_frame=/bodyset/femur_distal_l socket_child_frame=/bodyset/tibia_proximal_l
      Coordinate knee_flex_l: default_value=0 range=(-0.1745329 2.792527) clamped=true
      Coordinate knee_add_l: default_value=0 range=(-0.8726646 0.8726646) clamped=true
      Coordinate knee_rot_l: default_value=0 range=(-0.8726646 0.8726646) clamped=true
      Coordinate knee_tx_l: default_value=0 range=(-0.2 0.2) clamped=true
      Coordinate knee_ty_l: default_value=0 range=(-0.2 0.2) clamped=true
      Coordinate knee_tz_l: default_value=0 range=(-0.2 0.2) clamped=true
      SpatialTransform:
        TransformAxis rotation1: coordinates=knee_flex_l axis=(0 0 1) LinearFunction(coefficients=-1 0)
        TransformAxis rotation2: coordinates=knee_add_l axis=(1 0 0) LinearFunction(coefficients=1 0)
        TransformAxis rotation3: coordinates=knee_rot_l axis=(0 1 0) LinearFunction(coefficients=1 0)
        TransformAxis translation1: coordinates=knee_tx_l axis=(1 0 0) LinearFunction(coefficients=1 0)
        TransformAxis translation2: coordinates=knee_ty_l axis=(0 1 0) LinearFunction(coefficients=1 0)
        TransformAxis translation3: coordinates=knee_tz_l axis=(0 0 1) LinearFunction(coefficients=1 0)
    WeldJoint tibia_tibia_proximal_l: socket_parent_frame=tibia_proximal_l_offset socket_child_frame=/bodyset/tibia_l
      PhysicalOffsetFrame tibia_proximal_l_offset: socket_parent=/bodyset/tibia_proximal_l
          translation=(0.005850566 0 0)
    CustomJoint ankle_l: socket_parent_frame=tibia_l_offset socket_child_frame=/bodyset/talus_l
      Coordinate ankle_flex_l: default_value=0 range=(-1.570796 1.570796) clamped=true
      PhysicalOffsetFrame tibia_l_offset: socket_parent=/bodyset/tibia_l translation=(-0.009831553 -0.3932621 0)
      SpatialTransform: axes_held_at_zero=(rotation2 rotation3 translation1 translation2 translation3)
        TransformAxis rotation1: coordinates=ankle_flex_l axis=(-0.105014 -0.1740221 -0.9791263)
          SimmSpline: x=(-6.28319 6.28319) y=(6.28319 -6.28319)
    CustomJoint subtalar_l: socket_parent_frame=talus_l_offset socket_child_frame=/bodyset/calcn_l
      Coordinate subt_angle_l: default_value=0 range=(-0.6981317 0.6981317) clamped=true
      PhysicalOffsetFrame talus_l_offset: socket_parent=/bodyset/talus_l
          translation=(-0.05105309 -0.04391382 -0.008290761)
      SpatialTransform: axes_held_at_zero=(rotation2 rotation3 translation1 translation2 translation3)
        TransformAxis rotation1: coordinates=subt_angle_l axis=(0.78718 0.604747 0.120949)
          SimmSpline: x=(-6.28319 6.28319) y=(6.28319 -6.28319)
    CustomJoint mtp_l: socket_parent_frame=calcn_l_offset socket_child_frame=/bodyset/toes_l
      Coordinate mtp_angle_l: default_value=0 range=(-1.047198 1.047198) clamped=true
      PhysicalOffsetFrame calcn_l_offset: socket_parent=/bodyset/calcn_l
          translation=(0.1871702 -0.002093627 -0.001130558)
      SpatialTransform: axes_held_at_zero=(rotation2 rotation3 translation1 translation2 translation3)
        TransformAxis rotation1: coordinates=mtp_angle_l axis=(0.5809542 0 0.8139363)
          SimmSpline: x=(-6.28319 6.28319) y=(6.28319 -6.28319)
    CustomJoint pelvis_torso: socket_parent_frame=pelvis_offset socket_child_frame=/bodyset/torso
      Coordinate lumbar_ext: default_value=0 range=(-1.047198 1.047198) clamped=true
      Coordinate lumbar_latbend: default_value=0 range=(-1.047198 1.047198) clamped=true
      Coordinate lumbar_rot: default_value=0 range=(-1.047198 1.047198) clamped=true
      PhysicalOffsetFrame pelvis_offset: socket_parent=/bodyset/pelvis translation=(-0.1063782 0.05188748 0)
      SpatialTransform: axes_held_at_zero=(translation1 translation2 translation3)
        TransformAxis rotation1: coordinates=lumbar_ext axis=(0 0 1) LinearFunction(coefficients=1 0)
        TransformAxis rotation2: coordinates=lumbar_latbend axis=(1 0 0) LinearFunction(coefficients=1 0)
        TransformAxis rotation3: coordinates=lumbar_rot axis=(0 1 0) LinearFunction(coefficients=1 0)
    CustomJoint torso_neckhead: socket_parent_frame=torso_offset socket_child_frame=/bodyset/neckhead
      Coordinate neck_ext: default_value=0 range=(-0.8726646 1.256637) clamped=true
      Coordinate neck_latbend: default_value=0 range=(-0.6981317 0.6981317) clamped=true
      Coordinate neck_rot: default_value=0 range=(-1.151917 1.151917) clamped=true
      PhysicalOffsetFrame torso_offset: socket_parent=/bodyset/torso translation=(-0.02045232 0.3196653 0)
      SpatialTransform: axes_held_at_zero=(translation1 translation2 translation3)
        TransformAxis rotation1: coordinates=neck_ext axis=(0 0 1) LinearFunction(coefficients=1 0)
        TransformAxis rotation2: coordinates=neck_latbend axis=(1 0 0) LinearFunction(coefficients=1 0)
        TransformAxis rotation3: coordinates=neck_rot axis=(0 1 0) LinearFunction(coefficients=1 0)
    CustomJoint acromial_r: socket_parent_frame=torso_offset socket_child_frame=/bodyset/humerus_r
      Coordinate arm_add_r: default_value=0 range=(-2.094395 1.570796) clamped=true
      Coordinate arm_flex_r: default_value=0 range=(-1.570796 1.570796) clamped=true
      Coordinate arm_rot_r: default_value=0 range=(-1.570796 1.570796) clamped=true
      PhysicalOffsetFrame torso_offset: socket_parent=/bodyset/torso translation=(-0.02271582 0.2965243 0.1640212)
      SpatialTransform: axes_held_at_zero=(translation1 translation2 translation3)
        TransformAxis rotation1: coordinates=arm_add_r axis=(1 0 0) LinearFunction(coefficients=1 0)
        TransformAxis rotation2: coordinates=arm_flex_r axis=(0 0 1) LinearFunction(coefficients=1 0)
        TransformAxis rotation3: coordinates=arm_rot_r axis=(0 1 0) LinearFunction(coefficients=1 0)
    CustomJoint elbow_r: socket_parent_frame=humerus_r_offset socket_child_frame=/bodyset/ulna_r
      Coordinate elbow_flex_r: default_value=0 range=(0 2.792527) clamped=true
      PhysicalOffsetFrame humerus_r_offset: socket_parent=/bodyset/humerus_r
          translation=(0.01075208 -0.2341776 -0.007848921)
      SpatialTransform: axes_held_at_zero=(rotation2 rotation3 translation1 translation2 translation3)
        TransformAxis rotation1: coordinates=elbow_flex_r axis=(0.226047 0.022269 0.9738618)
            LinearFunction(coefficients=1 0)
    CustomJoint radioulnar_r: socket_parent_frame=ulna_r_offset socket_child_frame=/bodyset/radius_r
      Coordinate pro_sup_r: default_value=1.047198 range=(0 1.570796) clamped=true
      PhysicalOffsetFrame ulna_r_offset: socket_parent=/bodyset/ulna_r
          translation=(-0.005025992 -0.009718013 0.01948758)
      SpatialTransform: axes_held_at_zero=(rotation1 rotation3 translation1 translation2 translation3)
        TransformAxis rotation2: coordinates=pro_sup_r axis=(0.05639803 0.9984065 0.001952001)
            LinearFunction(coefficients=1 0)
    CustomJoint radius_hand_r: socket_parent_frame=radius_r_offset socket_child_frame=/bodyset/hand_r
      Coordinate wrist_flex_r: default_value=0 range=(-1.22173 1.22173) clamped=true
      PhysicalOffsetFrame radius_r_offset: socket_parent=/bodyset/radius_r
          translation=(-0.006572565 -0.1762056 0.01016854)
      SpatialTransform: axes_held_at_zero=(rotation2 rotation3 translation1 translation2 translation3)
        TransformAxis rotation1: coordinates=wrist_flex_r axis=(0 0 1) LinearFunction(coefficients=1 0)
    CustomJoint acromial_l: socket_parent_frame=torso_offset socket_child_frame=/bodyset/humerus_l
      Coordinate arm_add_l: default_value=0 range=(-2.094395 1.570796) clamped=true
      Coordinate arm_flex_l: default_value=0 range=(-1.570796 1.570796) clamped=true
      Coordinate arm_rot_l: default_value=0 range=(-1.570796 1.570796) clamped=true
      PhysicalOffsetFrame torso_offset: socket_parent=/bodyset/torso translation=(-0.02271582 0.2965243 -0.1640212)
      SpatialTransform: axes_held_at_zero=(translation1 translation2 translation3)
        TransformAxis rotation1: coordinates=arm_add_l axis=(-1 0 0) LinearFunction(coefficients=1 0)
        TransformAxis rotation2: coordinates=arm_flex_l axis=(0 0 1) LinearFunction(coefficients=1 0)
        TransformAxis rotation3: coordinates=arm_rot_l axis=(0 -1 0) LinearFunction(coefficients=1 0)
    CustomJoint elbow_l: socket_parent_frame=humerus_l_offset socket_child_frame=/bodyset/ulna_l
      Coordinate elbow_flex_l: default_value=0 range=(0 2.792527) clamped=true
      PhysicalOffsetFrame humerus_l_offset: socket_parent=/bodyset/humerus_l
          translation=(0.01075208 -0.2341776 0.007848921)
      SpatialTransform: axes_held_at_zero=(rotation2 rotation3 translation1 translation2 translation3)
        TransformAxis rotation1: coordinates=elbow_flex_l axis=(-0.226047 -0.022269 0.9738618)
            LinearFunction(coefficients=1 0)
    CustomJoint radioulnar_l: socket_parent_frame=ulna_l_offset socket_child_frame=/bodyset/radius_l
      Coordinate pro_sup_l: default_value=1.047198 range=(0 1.570796) clamped=true
      PhysicalOffsetFrame ulna_l_offset: socket_parent=/bodyset/ulna_l
          translation=(-0.005025992 -0.009718013 -0.01948758)
      SpatialTransform: axes_held_at_zero=(rotation1 rotation3 translation1 translation2 translation3)
        TransformAxis rotation2: coordinates=pro_sup_l axis=(-0.05639803 -0.9984065 0.001952001)
            LinearFunction(coefficients=1 0)
    CustomJoint radius_hand_l: socket_parent_frame=radius_l_offset socket_child_frame=/bodyset/hand_l
      Coordinate wrist_flex_l: default_value=0 range=(-1.22173 1.22173) clamped=true
      PhysicalOffsetFrame radius_l_offset: socket_parent=/bodyset/radius_l
          translation=(-0.006572565 -0.1762056 -0.01016854)
      SpatialTransform: axes_held_at_zero=(rotation2 rotation3 translation1 translation2 translation3)
        TransformAxis rotation1: coordinates=wrist_flex_l axis=(0 0 1) LinearFunction(coefficients=1 0)
  ForceSet:
    Millard2012EquilibriumMuscle [values shared by the 88 below unless stated]:
      ActiveForceLengthCurve: minimum_value=0
      ForceVelocityCurve: concentric_slope_at_vmax=0 concentric_slope_near_vmax=0.25 isometric_slope=5
          eccentric_slope_at_vmax=0 eccentric_slope_near_vmax=0.15 max_eccentric_velocity_force_multiplier=1.4
      FiberForceLengthCurve
      TendonForceLengthCurve
    Millard2012EquilibriumMuscle addbrev_r: max_isometric_force=303.7 optimal_fiber_length=0.09674124
        tendon_slack_length=0.03377968 pennation_angle_at_optimal=0.1064651 [radians] minimum_activation=0.01
      PathPoint P1: pelvis (-0.02031823 -0.08868043 0.01638224)
      PathPoint P2: femur_r (-0.001749691 -0.1032318 0.02178365)
    Millard2012EquilibriumMuscle addlong_r: max_isometric_force=399.5 optimal_fiber_length=0.09667519
        tendon_slack_length=0.1161532 pennation_angle_at_optimal=0.1235693 minimum_activation=0.01
      PathPoint P1: pelvis (-0.008063465 -0.08386904 0.0200842)
      PathPoint P2: femur_r (0.009850759 -0.2094117 0.0138488)
    Millard2012EquilibriumMuscle addlong_l: max_isometric_force=399.5 optimal_fiber_length=0.09938688
        tendon_slack_length=0.1194112 pennation_angle_at_optimal=0.1235693 minimum_activation=0.01
      PathPoint P1: pelvis (-0.008063465 -0.08386904 -0.0200842)
      PathPoint P2: femur_l (0.01015849 -0.2159537 -0.01428143)
    Millard2012EquilibriumMuscle addmagProx_r: max_isometric_force=324.2 optimal_fiber_length=0.1025065
        tendon_slack_length=0.04174034 pennation_angle_at_optimal=0.3872886 minimum_activation=0.01
      PathPoint P1: pelvis (-0.03295596 -0.1014636 0.01452062)
      PathPoint P2: femur_r (-0.01335889 -0.06899031 0.02801255)
    Millard2012EquilibriumMuscle addmagMid_r: max_isometric_force=324.2 optimal_fiber_length=0.1232777
        tendon_slack_length=0.04297261 pennation_angle_at_optimal=0.2567379 minimum_activation=0.01
      PathPoint P1: pelvis (-0.05601874 -0.1139166 0.03036033)
      PathPoint P2: femur_r (0.002117126 -0.1420749 0.02556298)
    Millard2012EquilibriumMuscle addmagMid_l: max_isometric_force=324.2 optimal_fiber_length=0.1271574
        tendon_slack_length=0.04432504 pennation_angle_at_optimal=0.2567379 minimum_activation=0.01
      PathPoint P1: pelvis (-0.05601874 -0.1139166 -0.03036033)
      PathPoint P2: femur_l (0.002183264 -0.1465133 -0.02636156)
    Millard2012EquilibriumMuscle addmagDist_r: max_isometric_force=324.2 optimal_fiber_length=0.1543813
        tendon_slack_length=0.07841035 pennation_angle_at_optimal=0.2412045 minimum_activation=0.01
      PathPoint P1: pelvis (-0.07876239 -0.120445 0.04235979)
      PathPoint P2: femur_r (0.009842011 -0.2296469 0.01688452)
    Millard2012EquilibriumMuscle addmagDist_l: max_isometric_force=324.2 optimal_fiber_length=0.159941
        tendon_slack_length=0.08123417 pennation_angle_at_optimal=0.2412045 minimum_activation=0.01
      PathPoint P1: pelvis (-0.07876239 -0.120445 -0.04235979)
      PathPoint P2: femur_l (0.01014947 -0.236821 -0.01741198)
    Millard2012EquilibriumMuscle addmagIsch_r: max_isometric_force=324.2 optimal_fiber_length=0.135464
        tendon_slack_length=0.1916616 pennation_angle_at_optimal=0.2073451 minimum_activation=0.01
      PathPoint P1: pelvis (-0.09533611 -0.1224167 0.04437033)
      PathPoint P2: femur_r (0.004208006 -0.3394138 -0.02863369)
    Millard2012EquilibriumMuscle addmagIsch_l: max_isometric_force=324.2 optimal_fiber_length=0.140302
        tendon_slack_length=0.1985067 pennation_angle_at_optimal=0.2073451 minimum_activation=0.01
      PathPoint P1: pelvis (-0.09533611 -0.1224167 -0.04437033)
      PathPoint P2: femur_l (0.004339463 -0.3500169 0.02952819)
    Millard2012EquilibriumMuscle bflh_r: max_isometric_force=705.2 optimal_fiber_length=0.08578892
        tendon_slack_length=0.2830331 pennation_angle_at_optimal=0.2021091 minimum_activation=0.01
      PathPoint P1: pelvis (-0.1106333 -0.11236 0.06233761)
      PathPoint P2: tibia_r (-0.0302219 -0.04051832 0.0317473)
    Millard2012EquilibriumMuscle bflh_l: max_isometric_force=705.2 optimal_fiber_length=0.08870906
        tendon_slack_length=0.2926672 pennation_angle_at_optimal=0.2021091 minimum_activation=0.01
      PathPoint P1: pelvis (-0.1106333 -0.11236 -0.06233761)
      PathPoint P2: tibia_l (-0.03116602 -0.0417841 -0.03273907)
    Millard2012EquilibriumMuscle bfsh_r: max_isometric_force=631.6 optimal_fiber_length=0.09817917
        tendon_slack_length=0.09257148 pennation_angle_at_optimal=0.2151991 minimum_activation=0.01
      PathPoint P1: femur_r (0.004374227 -0.1846799 0.02047138)
      PathPoint P2: tibia_r (-0.02869651 -0.0399463 0.03031724)
    Millard2012EquilibriumMuscle bfsh_l: max_isometric_force=631.6 optimal_fiber_length=0.1012463
        tendon_slack_length=0.09546337 pennation_angle_at_optimal=0.2151991 minimum_activation=0.01
      PathPoint P1: femur_l (0.004510876 -0.1904492 -0.0211109)
      PathPoint P2: tibia_l (-0.02959297 -0.04119421 -0.03126434)
    Millard2012EquilibriumMuscle edl_r: max_isometric_force=345.4 optimal_fiber_length=0.06986767
        tendon_slack_length=0.3703087 pennation_angle_at_optimal=0.1890192 minimum_activation=0.01
      PathPoint P1: tibia_r (-0.01525396 -0.1103052 0.01954413)
      PathPoint P2: tibia_r (0.01563531 -0.358468 0.01067777)
      PathPoint P3: calcn_r (0.1006871 0.03944216 0.0008764924)
      PathPoint P4: calcn_r (0.1770515 0.006025885 0.014243)
      PathPoint P5: toes_r (0.0003286847 0.005149393 0.01676292)
      PathPoint P6: toes_r (0.04853577 -0.0004382462 0.02739039)
    Millard2012EquilibriumMuscle edl_l: max_isometric_force=345.4 optimal_fiber_length=0.06981889
        tendon_slack_length=0.3700502 pennation_angle_at_optimal=0.1890192 minimum_activation=0.01
      PathPoint P1: tibia_l (-0.01573048 -0.1137511 -0.02015468)
      PathPoint P2: tibia_l (0.01612375 -0.3696664 -0.01101134)
      PathPoint P3: calcn_l (0.09620214 0.03768528 -0.0008374507)
      PathPoint P4: calcn_l (0.169165 0.005757473 -0.01360857)
      PathPoint P5: toes_l (0.000314044 0.004920023 -0.01601624)
      PathPoint P6: toes_l (0.04637383 -0.0004187253 -0.02617033)
    Millard2012EquilibriumMuscle ehl_r: max_isometric_force=165 optimal_fiber_length=0.07595565
        tendon_slack_length=0.3366216 pennation_angle_at_optimal=0.1647591 minimum_activation=0.01
      PathPoint P1: tibia_r (-0.01334721 -0.1477727 0.01801874)
      PathPoint P2: tibia_r (0.006673606 -0.277336 0.01563531)
      PathPoint P3: tibia_r (0.01906745 -0.3520804 -0.002669442)
      PathPoint P4: calcn_r (0.1062747 0.04261944 -0.02311749)
      PathPoint P5: calcn_r (0.1416631 0.03385452 -0.02815732)
      PathPoint P6: calcn_r (0.1899797 0.01522906 -0.03067723)
      PathPoint P7: toes_r (0.03264934 0.004492024 -0.02684258)
      PathPoint P8: toes_r (0.06168315 0.003725093 -0.02037845)
    Millard2012EquilibriumMuscle ehl_l: max_isometric_force=165 optimal_fiber_length=0.07559966
        tendon_slack_length=0.335044 pennation_angle_at_optimal=0.1647591 minimum_activation=0.01
      PathPoint P1: tibia_l (-0.01376417 -0.1523891 -0.01858163)
      PathPoint P2: tibia_l (0.006882087 -0.2859999 -0.01612375)
      PathPoint P3: tibia_l (0.01966311 -0.3630792 0.002752835)
      PathPoint P4: calcn_l (0.1015409 0.04072104 0.02208776)
      PathPoint P5: calcn_l (0.135353 0.03234653 0.0269031)
      PathPoint P6: calcn_l (0.1815174 0.01455071 0.02931077)
      PathPoint P7: toes_l (0.03119504 0.004291935 0.02564693)
      PathPoint P8: toes_l (0.05893559 0.003559165 0.01947073)
    Millard2012EquilibriumMuscle fdl_r: max_isometric_force=274.4 optimal_fiber_length=0.045647
        tendon_slack_length=0.3865666 pennation_angle_at_optimal=0.2380629 minimum_activation=0.01
      PathPoint P1: tibia_r (-0.002192756 -0.1746578 -0.00171607)
      PathPoint P2: tibia_r (-0.01677935 -0.3475042 -0.01182182)
      PathPoint P3: calcn_r (0.04776884 0.03451189 -0.03067723)
      PathPoint P4: calcn_r (0.07756958 0.01928283 -0.02881469)
      PathPoint P5: calcn_r (0.1816531 -0.008874486 0.01270914)
      PathPoint P6: toes_r (-0.002081669 -0.008545801 0.01610555)
      PathPoint P7: toes_r (0.03122504 -0.00777887 0.02355573)
      PathPoint P8: toes_r (0.04831664 -0.006573693 0.0265139)
    Millard2012EquilibriumMuscle fdl_l: max_isometric_force=274.4 optimal_fiber_length=0.04524591
        tendon_slack_length=0.3831699 pennation_angle_at_optimal=0.2380629 minimum_activation=0.01
      PathPoint P1: tibia_l (-0.002261257 -0.180114 0.00176968)
      PathPoint P2: tibia_l (-0.01730353 -0.3583601 0.01219113)
      PathPoint P3: calcn_l (0.04564106 0.03297462 0.02931077)
      PathPoint P4: calcn_l (0.07411438 0.01842391 0.02753119)
      PathPoint P5: calcn_l (0.1735616 -0.008479188 -0.01214303)
      PathPoint P6: toes_l (-0.001988945 -0.008165144 -0.01538816)
      PathPoint P7: toes_l (0.02983418 -0.007432375 -0.02250649)
      PathPoint P8: toes_l (0.04616447 -0.00628088 -0.02533288)
    Millard2012EquilibriumMuscle fhl_r: max_isometric_force=436.8 optimal_fiber_length=0.05431685
        tendon_slack_length=0.3669222 pennation_angle_at_optimal=0.2947861 minimum_activation=0.01
      PathPoint P1: tibia_r (-0.02955454 -0.2062144 0.01906745)
      PathPoint P2: tibia_r (-0.02307161 -0.349983 -0.00724563)
      PathPoint P3: calcn_r (0.04097602 0.03023899 -0.02640433)
      PathPoint P4: calcn_r (0.1137249 0.007450186 -0.02804776)
      PathPoint P5: calcn_r (0.1891032 -0.005806762 -0.02947206)
      PathPoint P6: toes_r (0.01698204 -0.007011939 -0.02903381)
      PathPoint P7: toes_r (0.06157359 -0.01117528 -0.01983064)
    Millard2012EquilibriumMuscle fhl_l: max_isometric_force=436.8 optimal_fiber_length=0.05363334
        tendon_slack_length=0.3623049 pennation_angle_at_optimal=0.2947861 minimum_activation=0.01
      PathPoint P1: tibia_l (-0.03047781 -0.2126565 -0.01966311)
      PathPoint P2: tibia_l (-0.02379236 -0.3609163 0.00747198)
      PathPoint P3: calcn_l (0.03915082 0.02889205 0.0252282)
      PathPoint P4: calcn_l (0.1086592 0.007118331 0.02679842)
      PathPoint P5: calcn_l (0.18068 -0.005548111 0.02815928)
      PathPoint P6: toes_l (0.01622561 -0.006699605 0.02774055)
      PathPoint P7: toes_l (0.05883091 -0.0106775 0.01894732)
    Millard2012EquilibriumMuscle gaslat_r: max_isometric_force=606.4 optimal_fiber_length=0.05602362
        tendon_slack_length=0.3515768 pennation_angle_at_optimal=0.2101376 minimum_activation=0.01
      PathPoint P1: femur_r (-0.002624536 -0.333666 0.02423322)
      PathPoint P2: calcn_r (0.004820708 0.03396408 -0.005806762)
      PathWrap pathwrap_0: wrap_object=Gastroc_at_Condyles_r method=hybrid
    Millard2012EquilibriumMuscle gaslat_l: max_isometric_force=606.4 optimal_fiber_length=0.05761032
        tendon_slack_length=0.3615341 pennation_angle_at_optimal=0.2101376 minimum_activation=0.01
      PathPoint P1: femur_l (-0.002706526 -0.3440896 -0.02499025)
      PathPoint P2: calcn_l (0.004605979 0.03245121 0.005548111)
      PathWrap pathwrap_0: wrap_object=Gastroc_at_Condyles_l method=hybrid
    Millard2012EquilibriumMuscle gasmed_r: max_isometric_force=1308 optimal_fiber_length=0.04853061
        tendon_slack_length=0.3701648 pennation_angle_at_optimal=0.1724385 minimum_activation=0.01
      PathPoint P1: femur_r (0.006998763 -0.3313914 -0.01819678)
      PathPoint P2: calcn_r (0.004820708 0.03396408 -0.005806762)
      PathWrap pathwrap_0: wrap_object=Gastroc_at_Condyles_r method=hybrid
    Millard2012EquilibriumMuscle gasmed_l: max_isometric_force=1308 optimal_fiber_length=0.04990154
        tendon_slack_length=0.3806215 pennation_angle_at_optimal=0.1724385 minimum_activation=0.01
      PathPoint P1: femur_l (0.007217402 -0.341744 0.01876524)
      PathPoint P2: calcn_l (0.004605979 0.03245121 0.005548111)
      PathWrap pathwrap_0: wrap_object=Gastroc_at_Condyles_l method=hybrid
    Millard2012EquilibriumMuscle gem_r: max_isometric_force=218 optimal_fiber_length=0.02348252
        tendon_slack_length=0.03815909 pennation_angle_at_optimal=0 minimum_activation=0.01
      PathPoint P1: pelvis (-0.1101759 -0.07207643 0.07134784)
      PathPoint P2: femur_r (-0.0124228 -0.00288699 0.03875565)
    Millard2012EquilibriumMuscle gem_l: max_isometric_force=218 optimal_fiber_length=0.02376008
        tendon_slack_length=0.03861012 pennation_angle_at_optimal=0 minimum_activation=0.01
      PathPoint P1: pelvis (-0.1101759 -0.07207643 -0.07134784)
      PathPoint P2: femur_l (-0.01281089 -0.002977178 -0.03996636)
    Millard2012EquilibriumMuscle glmax1_r: max_isometric_force=1092.2 optimal_fiber_length=0.1390205
        tendon_slack_length=0.04718958 pennation_angle_at_optimal=0.3829252 minimum_activation=0.01
      PathPoint P1: pelvis (-0.1309515 0.0325476 0.05989091)
      PathPoint P2: pelvis (-0.1337174 -0.02283049 0.08286859)
      PathPoint P3: femur_r (-0.03884313 -0.02851996 0.02642033)
      PathPoint P4: femur_r (-0.02423322 -0.04951625 0.04111773)
      PathWrap pathwrap_0: wrap_object=Gmax_at_pelvis_r method=hybrid
    Millard2012EquilibriumMuscle glmax1_l: max_isometric_force=1092.2 optimal_fiber_length=0.1400155
        tendon_slack_length=0.04752734 pennation_angle_at_optimal=0.3829252 minimum_activation=0.01
      PathPoint P1: pelvis (-0.1309515 0.0325476 -0.05989091)
      PathPoint P2: pelvis (-0.1337174 -0.02283049 -0.08286859)
      PathPoint P3: femur_l (-0.04005658 -0.02941091 -0.02724569)
      PathPoint P4: femur_l (-0.02499025 -0.05106312 -0.04240223)
      PathWrap pathwrap_0: wrap_object=Gmax_at_pelvis_l method=hybrid
    Millard2012EquilibriumMuscle glmax2_r: max_isometric_force=1561 optimal_fiber_length=0.148059
        tendon_slack_length=0.0691697 pennation_angle_at_optimal=0.3829252 minimum_activation=0.01
      PathPoint P1: pelvis (-0.1401 0.008207656 0.04914671)
      PathPoint P2: pelvis (-0.1429723 -0.0574536 0.08648545)
      PathPoint P3: femur_r (-0.03936804 -0.05109097 0.0220461)
      PathPoint P4: femur_r (-0.01364759 -0.08888429 0.03665602)
      PathWrap pathwrap_0: wrap_object=Gmax_at_pelvis_r method=hybrid
    Millard2012EquilibriumMuscle glmax2_l: max_isometric_force=1561 optimal_fiber_length=0.1497314
        tendon_slack_length=0.069951 pennation_angle_at_optimal=0.3829252 minimum_activation=0.01
      PathPoint P1: pelvis (-0.1401 0.008207656 -0.04914671)
      PathPoint P2: pelvis (-0.1429723 -0.0574536 -0.08648545)
      PathPoint P3: femur_l (-0.04059788 -0.05268703 -0.02273482)
      PathPoint P4: femur_l (-0.01407393 -0.091661 -0.03780114)
      PathWrap pathwrap_0: wrap_object=Gmax_at_pelvis_l method=hybrid
    Millard2012EquilibriumMuscle glmax3_r: max_isometric_force=1058.2 optimal_fiber_length=0.1576007
        tendon_slack_length=0.06644788 pennation_angle_at_optimal=0.3829252 minimum_activation=0.01
      PathPoint P1: pelvis (-0.1382916 -0.04952896 0.009574035)
      PathPoint P2: pelvis (-0.1354194 -0.1191525 0.0462745)
      PathPoint P3: femur_r (-0.02458316 -0.09842011 0.008223547)
      PathPoint P4: femur_r (-0.005249072 -0.1241406 0.03595615)
      PathWrap pathwrap_0: wrap_object=Gmax_at_pelvis_r method=hybrid
    Millard2012EquilibriumMuscle glmax3_l: max_isometric_force=1058.2 optimal_fiber_length=0.1598477
        tendon_slack_length=0.06739524 pennation_angle_at_optimal=0.3829252 minimum_activation=0.01
      PathPoint P1: pelvis (-0.1382916 -0.04952896 -0.009574035)
      PathPoint P2: pelvis (-0.1354194 -0.1191525 -0.0462745)
      PathPoint P3: femur_l (-0.02535112 -0.1014947 -0.008480447)
      PathPoint P4: femur_l (-0.005413051 -0.1280187 -0.0370794)
      PathWrap pathwrap_0: wrap_object=Gmax_at_pelvis_l method=hybrid
    Millard2012EquilibriumMuscle glmed1_r: max_isometric_force=1762.2 optimal_fiber_length=0.06819154
        tendon_slack_length=0.05256238 pennation_angle_at_optimal=0.3572689 minimum_activation=0.01
      PathPoint P1: pelvis (-0.04733828 0.02311352 0.1246752)
      PathPoint P2: femur_r (-0.01907163 -0.01023569 0.04855392)
    Millard2012EquilibriumMuscle glmed1_l: max_isometric_force=1762.2 optimal_fiber_length=0.06853652
        tendon_slack_length=0.05282828 pennation_angle_at_optimal=0.3572689 minimum_activation=0.01
      PathPoint P1: pelvis (-0.04733828 0.02311352 -0.1246752)
      PathPoint P2: femur_l (-0.01966742 -0.01055545 -0.05007072)
    Millard2012EquilibriumMuscle glmed2_r: max_isometric_force=1033 optimal_fiber_length=0.06844914
        tendon_slack_length=0.06163224 pennation_angle_at_optimal=0.3572689 minimum_activation=0.01
      PathPoint P1: pelvis (-0.09042144 0.02981172 0.07180526)
      PathPoint P2: femur_r (-0.02257101 -0.005074103 0.04610435)
    Millard2012EquilibriumMuscle glmed2_l: max_isometric_force=1033 optimal_fiber_length=0.06887465
        tendon_slack_length=0.06201538 pennation_angle_at_optimal=0.3572689 minimum_activation=0.01
      PathPoint P1: pelvis (-0.09042144 0.02981172 -0.07180526)
      PathPoint P2: femur_l (-0.02327612 -0.005232616 -0.04754463)
    Millard2012EquilibriumMuscle glmed3_r: max_isometric_force=1404 optimal_fiber_length=0.0705243
        tendon_slack_length=0.04425809 pennation_angle_at_optimal=0.3572689 minimum_activation=0.01
      PathPoint P1: pelvis (-0.1225476 -0.006886884 0.05595492)
      PathPoint P2: femur_r (-0.02703272 -0.004111773 0.04531699)
    Millard2012EquilibriumMuscle glmed3_l: max_isometric_force=1404 optimal_fiber_length=0.07102491
        tendon_slack_length=0.04457225 pennation_angle_at_optimal=0.3572689 minimum_activation=0.01
      PathPoint P1: pelvis (-0.1225476 -0.006886884 -0.05595492)
      PathPoint P2: femur_l (-0.02787721 -0.004240223 -0.04673268)
    Millard2012EquilibriumMuscle glmin1_r: max_isometric_force=720 optimal_fiber_length=0.06185171
        tendon_slack_length=0.01455334 pennation_angle_at_optimal=0.1745329 minimum_activation=0.01
      PathPoint P1: pelvis (-0.04935947 -0.01405679 0.110846)
      PathPoint P2: femur_r (-0.006298887 -0.009098392 0.04899134)
    Millard2012EquilibriumMuscle glmin1_l: max_isometric_force=720 optimal_fiber_length=0.06247391
        tendon_slack_length=0.01469974 pennation_angle_at_optimal=0.1745329 minimum_activation=0.01
      PathPoint P1: pelvis (-0.04935947 -0.01405679 -0.110846)
      PathPoint P2: femur_l (-0.006495661 -0.009382622 -0.05052181)
    Millard2012EquilibriumMuscle glmin2_r: max_isometric_force=760 optimal_fiber_length=0.05065889
        tendon_slack_length=0.0235202 pennation_angle_at_optimal=0 minimum_activation=0.01
      PathPoint P1: pelvis (-0.06552895 -0.0133964 0.1032932)
      PathPoint P2: femur_r (-0.008398516 -0.009098392 0.04899134)
    Millard2012EquilibriumMuscle glmin2_l: max_isometric_force=760 optimal_fiber_length=0.05123363
        tendon_slack_length=0.02378704 pennation_angle_at_optimal=0 minimum_activation=0.01
      PathPoint P1: pelvis (-0.06552895 -0.0133964 -0.1032932)
      PathPoint P2: femur_l (-0.008660882 -0.009382622 -0.05052181)
    Millard2012EquilibriumMuscle glmin3_r: max_isometric_force=860 optimal_fiber_length=0.03485124
        tendon_slack_length=0.04677403 pennation_angle_at_optimal=0.01745329 minimum_activation=0.01
      PathPoint P1: pelvis (-0.08393237 -0.01462284 0.08488978)
      PathPoint P2: femur_r (-0.01181041 -0.007261217 0.0481165)
    Millard2012EquilibriumMuscle glmin3_l: max_isometric_force=860 optimal_fiber_length=0.03526788
        tendon_slack_length=0.04733321 pennation_angle_at_optimal=0.01745329 minimum_activation=0.01
      PathPoint P1: pelvis (-0.08393237 -0.01462284 -0.08488978)
      PathPoint P2: femur_l (-0.01217937 -0.007488054 -0.04961964)
    Millard2012EquilibriumMuscle grac_r: max_isometric_force=137.3 optimal_fiber_length=0.2011883
        tendon_slack_length=0.1492574 pennation_angle_at_optimal=0.1424189 minimum_activation=0.01
      PathPoint P1: pelvis (-0.0503807 -0.1220016 0.02612648)
      PathPoint P2: tibia_r (-0.01756112 -0.04533285 -0.02822935)
      PathPoint P3: tibia_r (0.001697003 -0.06637378 -0.01499655)
      PathWrap pathwrap_0: wrap_object=GR_at_condyles_r method=midpoint
    Millard2012EquilibriumMuscle grac_l: max_isometric_force=137.3 optimal_fiber_length=0.2081863
        tendon_slack_length=0.154449 pennation_angle_at_optimal=0.1424189 minimum_activation=0.01
      PathPoint P1: pelvis (-0.0503807 -0.1220016 -0.02612648)
      PathPoint P2: tibia_l (-0.01810972 -0.04674903 0.02911123)
      PathPoint P3: tibia_l (0.001750016 -0.06844727 0.01546503)
      PathWrap pathwrap_0: wrap_object=GR_at_condyles_l method=midpoint
    Millard2012EquilibriumMuscle iliacus_r: max_isometric_force=2487.6 optimal_fiber_length=0.1013886
        tendon_slack_length=0.08940457 pennation_angle_at_optimal=0.2494076 minimum_activation=0.01
      PathPoint P1: pelvis (-0.06435879 0.02915133 0.08967679)
      PathPoint P2: pelvis (-0.01436105 -0.05254787 0.08042189)
      PathPoint P3: femur_r (-0.002012144 -0.04942876 0.01216035)
      PathPoint P4: femur_r (-0.01067311 -0.05564017 0.01714697)
      PathWrap pathwrap_0: wrap_object=IL_at_brim_r method=hybrid
    Millard2012EquilibriumMuscle iliacus_l: max_isometric_force=2487.6 optimal_fiber_length=0.1022805
        tendon_slack_length=0.09019103 pennation_angle_at_optimal=0.2494076 minimum_activation=0.01
      PathPoint P1: pelvis (-0.06435879 0.02915133 -0.08967679)
      PathPoint P2: pelvis (-0.01436105 -0.05254787 -0.08042189)
      PathPoint P3: femur_l (-0.002075003 -0.0509729 -0.01254024)
      PathPoint P4: femur_l (-0.01100654 -0.05737834 -0.01768263)
      PathWrap pathwrap_0: wrap_object=IL_at_brim_l method=hybrid
    Millard2012EquilibriumMuscle pect_r: max_isometric_force=177 optimal_fiber_length=0.09274736
        tendon_slack_length=0.03060663 pennation_angle_at_optimal=0 minimum_activation=0.01
      PathPoint P1: pelvis (-0.02467973 -0.07853878 0.04817867)
      PathPoint P2: femur_r (-0.006972518 -0.07451933 0.02102253)
      PathWrap pathwrap_0: wrap_object=PECT_at_femshaft_r method=hybrid
    Millard2012EquilibriumMuscle pect_l: max_isometric_force=177 optimal_fiber_length=0.0947439
        tendon_slack_length=0.03126549 pennation_angle_at_optimal=0 minimum_activation=0.01
      PathPoint P1: pelvis (-0.02467973 -0.07853878 -0.04817867)
      PathPoint P2: femur_l (-0.007190336 -0.07684728 -0.02167927)
      PathWrap pathwrap_0: wrap_object=PECT_at_femshaft_l method=hybrid
    Millard2012EquilibriumMuscle perbrev_r: max_isometric_force=305.9 optimal_fiber_length=0.04469165
        tendon_slack_length=0.1457893 pennation_angle_at_optimal=0.2000147 minimum_activation=0.01
      PathPoint P1: tibia_r (-0.02316695 -0.2413939 0.02392964)
      PathPoint P2: tibia_r (-0.03231932 -0.3711478 0.02373897)
      PathPoint P3: tibia_r (-0.02717111 -0.3817303 0.02431099)
      PathPoint P4: calcn_r (0.05160349 0.02958162 0.02552784)
      PathPoint P5: calcn_r (0.07417317 0.02399398 0.03757961)
    Millard2012EquilibriumMuscle perbrev_l: max_isometric_force=305.9 optimal_fiber_length=0.0452437
        tendon_slack_length=0.1475901 pennation_angle_at_optimal=0.2000147 minimum_activation=0.01
      PathPoint P1: tibia_l (-0.02389067 -0.2489349 -0.0246772)
      PathPoint P2: tibia_l (-0.03332896 -0.3827424 -0.02448057)
      PathPoint P3: tibia_l (-0.02801993 -0.3936554 -0.02507046)
      PathPoint P4: calcn_l (0.04930491 0.02826396 -0.02439075)
      PathPoint P5: calcn_l (0.07086926 0.02292521 -0.0359057)
    Millard2012EquilibriumMuscle perlong_r: max_isometric_force=653.3 optimal_fiber_length=0.05070358
        tendon_slack_length=0.3323679 pennation_angle_at_optimal=0.2457424 minimum_activation=0.01
      PathPoint P1: tibia_r (-0.01906745 -0.130898 0.0268851)
      PathPoint P2: tibia_r (-0.0302219 -0.3718152 0.02259492)
      PathPoint P3: tibia_r (-0.02593173 -0.3826836 0.02288094)
      PathPoint P4: calcn_r (0.04798796 0.02519916 0.0242131)
      PathPoint P5: calcn_r (0.07461142 0.01161352 0.03111548)
      PathPoint P6: calcn_r (0.09334644 0.007559747 0.01292826)
      PathPoint P7: calcn_r (0.1318025 0.009312732 -0.02015933)
    Millard2012EquilibriumMuscle perlong_l: max_isometric_force=653.3 optimal_fiber_length=0.05094983
        tendon_slack_length=0.3339822 pennation_angle_at_optimal=0.2457424 minimum_activation=0.01
      PathPoint P1: tibia_l (-0.01966311 -0.1349872 -0.02772498)
      PathPoint P2: tibia_l (-0.03116602 -0.3834306 -0.02330078)
      PathPoint P3: tibia_l (-0.02674182 -0.3946385 -0.02359573)
      PathPoint P4: calcn_l (0.04585042 0.02407671 -0.02313457)
      PathPoint P5: calcn_l (0.07128799 0.01109622 -0.0297295)
      PathPoint P6: calcn_l (0.08918849 0.007223012 -0.0123524)
      PathPoint P7: calcn_l (0.1259316 0.008897913 0.01926137)
    Millard2012EquilibriumMuscle pertert_r: max_isometric_force=90 optimal_fiber_length=0.07816584
        tendon_slack_length=0.0989441 pennation_angle_at_optimal=0.2268928 minimum_activation=0.01
      PathPoint P1: tibia_r (-0.01420525 -0.236913 0.02116487)
      PathPoint P2: tibia_r (0.01029642 -0.3641882 0.02145088)
      PathPoint P3: calcn_r (0.09389425 0.02498003 0.0327589)
    Millard2012EquilibriumMuscle pertert_l: max_isometric_force=90 optimal_fiber_length=0.0789164
        tendon_slack_length=0.09989418 pennation_angle_at_optimal=0.2268928 minimum_activation=0.01
      PathPoint P1: tibia_l (-0.01464901 -0.2443141 -0.02182605)
      PathPoint P2: tibia_l (0.01061808 -0.3755653 -0.02212099)
      PathPoint P3: calcn_l (0.0897119 0.02386734 -0.03129972)
    Millard2012EquilibriumMuscle piri_r: max_isometric_force=296 optimal_fiber_length=0.02582762
        tendon_slack_length=0.1142375 pennation_angle_at_optimal=0.1745329 minimum_activation=0.01
      PathPoint P1: pelvis (-0.1083036 -0.006160459 0.01437169)
      PathPoint P2: pelvis (-0.108527 -0.02892491 0.06480558)
      PathPoint P3: femur_r (-0.01294771 -0.003149443 0.03823074)
    Millard2012EquilibriumMuscle piri_l: max_isometric_force=296 optimal_fiber_length=0.02595938
        tendon_slack_length=0.1148203 pennation_angle_at_optimal=0.1745329 minimum_activation=0.01
      PathPoint P1: pelvis (-0.1083036 -0.006160459 -0.01437169)
      PathPoint P2: pelvis (-0.108527 -0.02892491 -0.06480558)
      PathPoint P3: femur_l (-0.01335219 -0.003247831 -0.03942506)
    Millard2012EquilibriumMuscle psoas_r: max_isometric_force=1916 optimal_fiber_length=0.1110512
        tendon_slack_length=0.09214685 pennation_angle_at_optimal=0.1860521 minimum_activation=0.01
      PathPoint P1: pelvis (-0.06446517 0.058397 0.04148748)
      PathPoint P2: pelvis (-0.02180752 -0.06169893 0.06978408)
      PathPoint P3: femur_r (-0.01154796 -0.04085528 0.004024289)
      PathPoint P4: femur_r (-0.02055887 -0.0458419 0.007698639)
      PathWrap pathwrap_0: wrap_object=PS_at_brim_r method=hybrid
    Millard2012EquilibriumMuscle psoas_l: max_isometric_force=1916 optimal_fiber_length=0.1117879
        tendon_slack_length=0.09275814 pennation_angle_at_optimal=0.1860521 minimum_activation=0.01
      PathPoint P1: pelvis (-0.06446517 0.058397 -0.04148748)
      PathPoint P2: pelvis (-0.02180752 -0.06169893 -0.06978408)
      PathPoint P3: femur_l (-0.01190871 -0.04213158 -0.004150006)
      PathPoint P4: femur_l (-0.02120112 -0.04727398 -0.007939142)
      PathWrap pathwrap_0: wrap_object=PS_at_brim_l method=hybrid
    Millard2012EquilibriumMuscle quadfem_r: max_isometric_force=508 optimal_fiber_length=0.05428597
        tendon_slack_length=0.0241271 pennation_angle_at_optimal=0 minimum_activation=0.01
      PathPoint P1: pelvis (-0.1190584 -0.1082373 0.05495496)
      PathPoint P2: femur_r (-0.03127572 -0.03107451 0.03159942)
    Millard2012EquilibriumMuscle quadfem_l: max_isometric_force=508 optimal_fiber_length=0.0546578
        tendon_slack_length=0.02429236 pennation_angle_at_optimal=0 minimum_activation=0.01
      PathPoint P1: pelvis (-0.1190584 -0.1082373 -0.05495496)
      PathPoint P2: femur_l (-0.03225276 -0.03204526 -0.03258657)
    Millard2012EquilibriumMuscle recfem_r: max_isometric_force=848.8 optimal_fiber_length=0.06665569
        tendon_slack_length=0.3198419 pennation_angle_at_optimal=0.2431244 minimum_activation=0.01
      PathPoint P1: pelvis (-0.02553076 -0.03660426 0.09925083)
      PathPoint P2: patella_r (-9.685988e-5 0.01415478 0.001076137)
      PathPoint P3: patella_r (0.003327155 0.01188639 0.0007457975)
      PathWrap pathwrap_0: wrap_object=KnExt_at_fem_r
    Millard2012EquilibriumMuscle recfem_l: max_isometric_force=848.8 optimal_fiber_length=0.06855274
        tendon_slack_length=0.3289448 pennation_angle_at_optimal=0.2431244 minimum_activation=0.01
      PathPoint P1: pelvis (-0.02553076 -0.03660426 -0.09925083)
      PathPoint P2: patella_l (-9.988574e-5 0.01459697 -0.001109755)
      PathPoint P3: patella_l (0.003431094 0.01225772 -0.0007690959)
      PathWrap pathwrap_0: wrap_object=KnExt_at_fem_l
    Millard2012EquilibriumMuscle sart_r: max_isometric_force=113.5 optimal_fiber_length=0.3625373
        tendon_slack_length=0.0989556 pennation_angle_at_optimal=0.02321288 minimum_activation=0.01
      PathPoint P1: pelvis (-0.02074374 -0.01471718 0.1123353)
      PathPoint P2: femur_r (-0.002624536 -0.3121448 -0.03683099)
      PathPoint P3: tibia_r (-0.02392964 -0.03823023 -0.03479809)
      PathPoint P4: tibia_r (-0.01515862 -0.057107 -0.02516903)
      PathPoint P5: tibia_r (0.01296586 -0.07722316 -0.002478768)
    Millard2012EquilibriumMuscle sart_l: max_isometric_force=113.5 optimal_fiber_length=0.3724092
        tendon_slack_length=0.1016501 pennation_angle_at_optimal=0.02321288 minimum_activation=0.01
      PathPoint P1: pelvis (-0.02074374 -0.01471718 -0.1123353)
      PathPoint P2: femur_l (-0.002706526 -0.3218961 0.03798158)
      PathPoint P3: tibia_l (-0.0246772 -0.03942453 0.03588517)
      PathPoint P4: tibia_l (-0.01563217 -0.058891 0.0259553)
      PathPoint P5: tibia_l (0.01337091 -0.07963558 0.002556204)
    Millard2012EquilibriumMuscle semimem_r: max_isometric_force=1162.7 optimal_fiber_length=0.06054539
        tendon_slack_length=0.3316834 pennation_angle_at_optimal=0.2633702 minimum_activation=0.01
      PathPoint P1: pelvis (-0.1049953 -0.1075486 0.06531619)
      PathPoint P2: tibia_r (-0.0276478 -0.03975563 -0.0186861)
    Millard2012EquilibriumMuscle semimem_l: max_isometric_force=1162.7 optimal_fiber_length=0.06260183
        tendon_slack_length=0.3429492 pennation_angle_at_optimal=0.2633702 minimum_activation=0.01
      PathPoint P1: pelvis (-0.1049953 -0.1075486 -0.06531619)
      PathPoint P2: tibia_l (-0.0285115 -0.04099758 0.01926984)
    Millard2012EquilibriumMuscle semiten_r: max_isometric_force=301.9 optimal_fiber_length=0.1708035
        tendon_slack_length=0.216823 pennation_angle_at_optimal=0.2244493 minimum_activation=0.01
      PathPoint P1: pelvis (-0.1104205 -0.1182091 0.05478476)
      PathPoint P2: tibia_r (-0.02974522 -0.04843131 -0.02183223)
      PathPoint P3: tibia_r (0.001811407 -0.07369568 -0.01115446)
    Millard2012EquilibriumMuscle semiten_l: max_isometric_force=301.9 optimal_fiber_length=0.1766841
        tendon_slack_length=0.2242881 pennation_angle_at_optimal=0.2244493 minimum_activation=0.01
      PathPoint P1: pelvis (-0.1104205 -0.1182091 -0.05478476)
      PathPoint P2: tibia_l (-0.03067444 -0.04994429 0.02251426)
      PathPoint P3: tibia_l (0.001867995 -0.0759979 0.01150292)
    Millard2012EquilibriumMuscle soleus_r: max_isometric_force=3585.9 optimal_fiber_length=0.04228986
        tendon_slack_length=0.270559 pennation_angle_at_optimal=0.4930555 minimum_activation=0.01
      PathPoint P1: tibia_r (-0.00724563 -0.0873289 0.009343049)
      PathPoint P2: calcn_r (0.004820708 0.03396408 -0.005806762)
    Millard2012EquilibriumMuscle soleus_l: max_isometric_force=3585.9 optimal_fiber_length=0.04340963
        tendon_slack_length=0.277723 pennation_angle_at_optimal=0.4930555 minimum_activation=0.01
      PathPoint P1: tibia_l (-0.00747198 -0.09005702 -0.009634922)
      PathPoint P2: calcn_l (0.004605979 0.03245121 0.005548111)
    Millard2012EquilibriumMuscle tfl_r: max_isometric_force=155 optimal_fiber_length=0.08474468
        tendon_slack_length=0.4014222 pennation_angle_at_optimal=0.05235988 minimum_activation=0.01
      PathPoint P1: pelvis (-0.03308361 0.02018895 0.1320153)
      PathPoint P2: femur_r (0.02572045 -0.08704712 0.05222827)
      PathPoint P3: tibia_r (0.01029642 -0.03908826 0.03298668)
    Millard2012EquilibriumMuscle tfl_l: max_isometric_force=155 optimal_fiber_length=0.08688534
        tendon_slack_length=0.4115621 pennation_angle_at_optimal=0.05235988 minimum_activation=0.01
      PathPoint P1: pelvis (-0.03308361 0.02018895 -0.1320153)
      PathPoint P2: femur_l (0.02652395 -0.08976643 -0.05385986)
      PathPoint P3: tibia_l (0.01061808 -0.04030937 -0.03401717)
    Millard2012EquilibriumMuscle tibant_r: max_isometric_force=673.7 optimal_fiber_length=0.06702731
        tendon_slack_length=0.2365093 pennation_angle_at_optimal=0.1668535 minimum_activation=0.01
      PathPoint P1: tibia_r (0.01468193 -0.1250824 0.01544463)
      PathPoint P2: tibia_r (0.02392964 -0.1817128 0.01220317)
      PathPoint P3: tibia_r (0.02221357 -0.3488389 -0.01258451)
      PathPoint P4: calcn_r (0.1277488 0.01950196 -0.03341627)
    Millard2012EquilibriumMuscle tibant_l: max_isometric_force=673.7 optimal_fiber_length=0.06798797
        tendon_slack_length=0.239899 pennation_angle_at_optimal=0.1668535 minimum_activation=0.01
      PathPoint P1: tibia_l (0.01514059 -0.12899 -0.01592712)
      PathPoint P2: tibia_l (0.0246772 -0.1873894 -0.01258439)
      PathPoint P3: tibia_l (0.02290752 -0.3597365 0.01297765)
      PathPoint P4: calcn_l (0.1220584 0.01863328 0.03192781)
    Millard2012EquilibriumMuscle tibpost_r: max_isometric_force=905.6 optimal_fiber_length=0.03688628
        tendon_slack_length=0.2749882 pennation_angle_at_optimal=0.2392846 minimum_activation=0.01
      PathPoint P1: tibia_r (-0.003908826 -0.1243197 0.009819735)
      PathPoint P2: tibia_r (-0.01563531 -0.3484576 -0.01668402)
      PathPoint P3: calcn_r (0.04568717 0.03659356 -0.0313346)
      PathPoint P4: calcn_r (0.08458152 0.01742029 -0.0307868)
    Millard2012EquilibriumMuscle tibpost_l: max_isometric_force=905.6 optimal_fiber_length=0.03754001
        tendon_slack_length=0.2798618 pennation_angle_at_optimal=0.2392846 minimum_activation=0.01
      PathPoint P1: tibia_l (-0.004030937 -0.1282034 -0.0101265)
      PathPoint P2: tibia_l (-0.01612375 -0.3593433 0.01720522)
      PathPoint P3: calcn_l (0.04365212 0.03496356 0.02993886)
      PathPoint P4: calcn_l (0.08081399 0.01664433 0.02941545)
    Millard2012EquilibriumMuscle vasint_r: max_isometric_force=1024.2 optimal_fiber_length=0.08611728
        tendon_slack_length=0.1054568 pennation_angle_at_optimal=0.07923795 minimum_activation=0.01
      PathPoint P1: femur_r (0.02537052 -0.1683203 0.02712021)
      PathPoint P2: femur_r (0.02930732 -0.1823178 0.02493309)
      PathPoint P3: patella_r (-0.003597243 0.01707749 -0.0003379132)
      PathWrap pathwrap_0: wrap_object=KnExt_vasint_at_fem_r
    Millard2012EquilibriumMuscle vasint_l: max_isometric_force=1024.2 optimal_fiber_length=0.08881744
        tendon_slack_length=0.1087633 pennation_angle_at_optimal=0.07923795 minimum_activation=0.01
      PathPoint P1: femur_l (0.02616308 -0.1735785 -0.02796743)
      PathPoint P2: femur_l (0.03022287 -0.1880133 -0.02571199)
      PathPoint P3: patella_l (-0.00370962 0.01761098 0.0003484695)
      PathWrap pathwrap_0: wrap_object=KnExt_vasint_at_fem_l
    Millard2012EquilibriumMuscle vaslat_r: max_isometric_force=2255.4 optimal_fiber_length=0.08669381
        tendon_slack_length=0.1241099 pennation_angle_at_optimal=0.3207915 minimum_activation=0.01
      PathPoint P1: femur_r (0.004199258 -0.1621963 0.0305321)
      PathPoint P2: femur_r (0.02353334 -0.2266724 0.03578118)
      PathPoint P3: patella_r (0.001564545 0.01426919 0.01120483)
      PathWrap pathwrap_0: wrap_object=KnExt_at_fem_r
    Millard2012EquilibriumMuscle vaslat_l: max_isometric_force=2255.4 optimal_fiber_length=0.08930945
        tendon_slack_length=0.1278545 pennation_angle_at_optimal=0.3207915 minimum_activation=0.01
      PathPoint P1: femur_l (0.004330441 -0.1672633 -0.03148591)
      PathPoint P2: femur_l (0.02426851 -0.2337536 -0.03689897)
      PathPoint P3: patella_l (0.00161342 0.01471495 -0.01155487)
      PathWrap pathwrap_0: wrap_object=KnExt_at_fem_l
    Millard2012EquilibriumMuscle vasmed_r: max_isometric_force=1443.7 optimal_fiber_length=0.08426052
        tendon_slack_length=0.1102002 pennation_angle_at_optimal=0.516792 minimum_activation=0.01
      PathPoint P1: femur_r (0.01224784 -0.18363 0.01644709)
      PathPoint P2: femur_r (0.0311445 -0.2422447 0.0007873608)
      PathPoint P3: patella_r (-0.0003729337 0.01482896 -0.008826856)
      PathWrap pathwrap_0: wrap_object=KnExt_at_fem_r
    Millard2012EquilibriumMuscle vasmed_l: max_isometric_force=1443.7 optimal_fiber_length=0.0868332
        tendon_slack_length=0.1135649 pennation_angle_at_optimal=0.516792 minimum_activation=0.01
      PathPoint P1: femur_l (0.01263045 -0.1893666 -0.01696089)
      PathPoint P2: femur_l (0.03211744 -0.2498123 -0.0008119577)
      PathPoint P3: patella_l (-0.000384584 0.01529221 0.009102603)
      PathWrap pathwrap_0: wrap_object=KnExt_at_fem_l
    Millard2012EquilibriumMuscle addbrev_l: max_isometric_force=303.7 optimal_fiber_length=0.09870378
        tendon_slack_length=0.03446495 pennation_angle_at_optimal=0.1064651 minimum_activation=0.01
      PathPoint P1: pelvis (-0.02031823 -0.08868043 -0.01638224)
      PathPoint P2: femur_l (-0.00180435 -0.1064567 -0.02246416)
    Millard2012EquilibriumMuscle addmagProx_l: max_isometric_force=324.2 optimal_fiber_length=0.104076
        tendon_slack_length=0.04237945 pennation_angle_at_optimal=0.3872886 minimum_activation=0.01
      PathPoint P1: pelvis (-0.03295596 -0.1014636 -0.01452062)
      PathPoint P2: femur_l (-0.01377622 -0.07114554 -0.02888765)
    Blankevoort1991Ligament MCLd1: linear_stiffness=500 [N] slack_length=0.02907583 [m]
      PathPoint P1: femur_distal_r (-0.001650467 -0.0004324688 -0.03523991)
      PathPoint P2: tibia_proximal_r (-0.0002034363 -0.03011878 -0.02967059)
      PathWrap pathwrap_: wrap_object=Med_Lig_r method=hybrid
    Blankevoort1991Ligament MCLd2: linear_stiffness=500 slack_length=0.03089905
      PathPoint P1: femur_distal_r (0.002732561 -0.0006374936 -0.03596421)
      PathPoint P2: tibia_proximal_r (0.004677002 -0.02955996 -0.02967059)
      PathWrap pathwrap_: wrap_object=Med_Lig_r method=hybrid
    Blankevoort1991Ligament MCLd3: linear_stiffness=500 slack_length=0.03510035
      PathPoint P1: femur_distal_r (0.003666392 0.003481914 -0.03690787)
      PathPoint P2: tibia_proximal_r (0.005124722 -0.03085064 -0.0297538)
      PathWrap pathwrap_: wrap_object=Med_Lig_r method=hybrid
    Blankevoort1991Ligament MCLd4: linear_stiffness=500 slack_length=0.03143433
      PathPoint P1: femur_distal_r (0.000909407 0.001364342 -0.03615426)
      PathPoint P2: tibia_proximal_r (0.002466198 -0.03064924 -0.02971597)
      PathWrap pathwrap_: wrap_object=Med_Lig_r method=hybrid
    Blankevoort1991Ligament MCLd5: linear_stiffness=500 slack_length=0.03525012
      PathPoint P1: femur_distal_r (-0.001023564 0.004432954 -0.03656369)
      PathPoint P2: tibia_proximal_r (-8.784873e-5 -0.03156926 -0.02971314)
      PathWrap pathwrap_: wrap_object=Med_Lig_r method=hybrid
    Blankevoort1991Ligament MCLs1: linear_stiffness=500 slack_length=0.06838218
      PathPoint P1: femur_distal_r (0.005078484 0.007885366 -0.03843683)
      PathPoint P2: tibia_proximal_r (0.01354319 -0.05780276 -0.01462396)
      PathWrap pathwrap_: wrap_object=Med_Lig_r method=hybrid
    Blankevoort1991Ligament MCLs2: linear_stiffness=500 slack_length=0.08490919
      PathPoint P1: femur_distal_r (0.005325936 0.01444336 -0.03838483)
      PathPoint P2: tibia_proximal_r (0.01818682 -0.0675486 -0.01034627)
      PathWrap pathwrap_: wrap_object=Med_Lig_r method=hybrid
    Blankevoort1991Ligament MCLs3: linear_stiffness=500 slack_length=0.06747229
      PathPoint P1: femur_distal_r (-0.0003830635 0.01564043 -0.03676131)
      PathPoint P2: tibia_proximal_r (0.00111897 -0.05244997 -0.02036916)
      PathWrap pathwrap_: wrap_object=Med_Lig_r method=hybrid
    Blankevoort1991Ligament MCLs4: linear_stiffness=500 slack_length=0.0777901
      PathPoint P1: femur_distal_r (-0.001088051 0.007652476 -0.03733243)
      PathPoint P2: tibia_proximal_r (0.006161997 -0.07075498 -0.01639688)
      PathWrap pathwrap_: wrap_object=Med_Lig_r method=hybrid
    Blankevoort1991Ligament MCLs5: linear_stiffness=500 slack_length=0.07388344
      PathPoint P1: femur_distal_r (0.002364551 0.01090604 -0.03841225)
      PathPoint P2: tibia_proximal_r (0.01127008 -0.06218163 -0.01554872)
      PathWrap pathwrap_: wrap_object=Med_Lig_r method=hybrid
    Blankevoort1991Ligament MCLs6: linear_stiffness=500 slack_length=0.0700738
      PathPoint P1: femur_distal_r (0.0008704028 0.01269219 -0.03807374)
      PathPoint P2: tibia_proximal_r (0.006777648 -0.0574425 -0.01842037)
      PathWrap pathwrap_: wrap_object=Med_Lig_r method=hybrid
    Blankevoort1991Ligament ACLpl1: linear_stiffness=820 slack_length=0.02374205
      PathPoint P1: femur_distal_r (-0.003627246 -2.919592e-5 0.00669529)
      PathPoint P2: tibia_proximal_r (0.009584151 -0.01936687 -0.0003421587)
    Blankevoort1991Ligament ACLpl2: linear_stiffness=820 slack_length=0.02173823
      PathPoint P1: femur_distal_r (-0.003653721 -0.002881959 0.00684308)
      PathPoint P2: tibia_proximal_r (0.00952269 -0.02016114 0.003702607)
    Blankevoort1991Ligament ACLpl3: linear_stiffness=820 slack_length=0.02640899
      PathPoint P1: femur_distal_r (-0.001189982 -0.0005809304 0.00546342)
      PathPoint P2: tibia_proximal_r (0.01335408 -0.02060649 0.001354603)
    Blankevoort1991Ligament ACLpl4: linear_stiffness=820 slack_length=0.0239634
      PathPoint P1: femur_distal_r (-0.0004702626 -0.00458046 0.005854975)
      PathPoint P2: tibia_proximal_r (0.01353185 -0.02029635 0.004572234)
    Blankevoort1991Ligament ACLpl5: linear_stiffness=820 slack_length=0.02312886
      PathPoint P1: femur_distal_r (-0.001442445 -0.002069443 0.005932888)
      PathPoint P2: tibia_proximal_r (0.01153672 -0.02014412 0.001619169)
    Blankevoort1991Ligament ACLpl6: linear_stiffness=820 slack_length=0.02374016
      PathPoint P1: femur_distal_r (-0.002590066 -0.002993818 0.006432047)
      PathPoint P2: tibia_proximal_r (0.01184876 -0.02077953 0.004091986)
    Blankevoort1991Ligament ACLam1: linear_stiffness=820 slack_length=0.03231058
      PathPoint P1: femur_distal_r (0.001104882 0.003016039 0.002473573)
      PathPoint P2: tibia_proximal_r (0.0155421 -0.01954085 -0.004934382)
    Blankevoort1991Ligament ACLam2: linear_stiffness=820 slack_length=0.02831807
      PathPoint P1: femur_distal_r (-0.001105449 0.001004936 0.004927006)
      PathPoint P2: tibia_proximal_r (0.01415686 -0.02046371 -0.0005397988)
    Blankevoort1991Ligament ACLam3: linear_stiffness=820 slack_length=0.02859001
      PathPoint P1: femur_distal_r (-0.0008854182 0.003495908 0.003941265)
      PathPoint P2: tibia_proximal_r (0.01128899 -0.01855369 -0.003637363)
    Blankevoort1991Ligament ACLam4: linear_stiffness=820 slack_length=0.03269968
      PathPoint P1: femur_distal_r (0.0008027956 0.0009697618 0.003831959)
      PathPoint P2: tibia_proximal_r (0.01750885 -0.02095162 -0.00175306)
    Blankevoort1991Ligament ACLam5: linear_stiffness=820 slack_length=0.03198068
      PathPoint P1: femur_distal_r (0.000533908 0.002408046 0.003370906)
      PathPoint P2: tibia_proximal_r (0.0152537 -0.01979048 -0.0034839)
    Blankevoort1991Ligament ACLam6: linear_stiffness=820 slack_length=0.03175913
      PathPoint P1: femur_distal_r (-0.0005421248 0.001629476 0.004357782)
      PathPoint P2: tibia_proximal_r (0.01549482 -0.02055638 -0.001272245)
    Blankevoort1991Ligament PCLal1: linear_stiffness=900 slack_length=0.03233743
      PathPoint P1: femur_distal_r (0.001005409 -0.002501656 -0.01012595)
      PathPoint P2: tibia_proximal_r (-0.01328411 -0.02968099 0.002776908)
    Blankevoort1991Ligament PCLal2: linear_stiffness=900 slack_length=0.02954682
      PathPoint P1: femur_distal_r (0.006724035 -0.004472478 -0.00439447)
      PathPoint P2: tibia_proximal_r (-0.009549166 -0.02426296 0.0027232)
    Blankevoort1991Ligament PCLal3: linear_stiffness=900 slack_length=0.0307766
      PathPoint P1: femur_distal_r (0.004409504 -0.0008392468 -0.006656806)
      PathPoint P2: tibia_proximal_r (-0.01139867 -0.0266051 0.002888199)
    Blankevoort1991Ligament PCLal4: linear_stiffness=900 slack_length=0.0316208
      PathPoint P1: femur_distal_r (0.004550486 -0.004281665 -0.007706278)
      PathPoint P2: tibia_proximal_r (-0.01200383 -0.02910987 -0.002138374)
    Blankevoort1991Ligament PCLal5: linear_stiffness=900 slack_length=0.03157371
      PathPoint P1: femur_distal_r (0.00474442 -0.003244485 -0.007143105)
      PathPoint P2: tibia_proximal_r (-0.01173434 -0.02818512 0.0008467828)
    Blankevoort1991Ligament PCLpm1: linear_stiffness=300 slack_length=0.03246877
      PathPoint P1: femur_distal_r (0.004305587 -0.005196301 -0.008534206)
      PathPoint P2: tibia_proximal_r (-0.0131593 -0.03004503 -0.003153144)
    Blankevoort1991Ligament PCLpm2: linear_stiffness=300 slack_length=0.03378092
      PathPoint P1: femur_distal_r (0.002092042 -0.007815962 -0.01007111)
      PathPoint P2: tibia_proximal_r (-0.01612361 -0.03099342 -0.006237074)
    Blankevoort1991Ligament PCLpm3: linear_stiffness=300 slack_length=0.02893447
      PathPoint P1: femur_distal_r (0.001715994 -0.005828972 -0.01014959)
      PathPoint P2: tibia_proximal_r (-0.01250781 -0.02800357 -0.006331062)
    Blankevoort1991Ligament PCLpm4: linear_stiffness=300 slack_length=0.0374926
      PathPoint P1: femur_distal_r (0.006153865 -0.007418073 -0.007613046)
      PathPoint P2: tibia_proximal_r (-0.01537662 -0.03162222 -0.001354603)
    Blankevoort1991Ligament PCLpm5: linear_stiffness=300 slack_length=0.03318635
      PathPoint P1: femur_distal_r (0.004611096 -0.007398216 -0.009204889)
      PathPoint P2: tibia_proximal_r (-0.01397909 -0.03030222 -0.004525807)
    Blankevoort1991Ligament LCL1: linear_stiffness=600 slack_length=0.04648815
      PathPoint P1: femur_distal_r (-0.002053179 0.001964486 0.03353413)
      PathPoint P2: tibia_proximal_r (-0.01249741 -0.04564102 0.04080734)
    Blankevoort1991Ligament LCL2: linear_stiffness=600 slack_length=0.05267198
      PathPoint P1: femur_distal_r (-0.002071618 0.005715883 0.03370149)
      PathPoint P2: tibia_proximal_r (-0.01403394 -0.0480068 0.04308329)
    Blankevoort1991Ligament LCL3: linear_stiffness=600 slack_length=0.05039499
      PathPoint P1: femur_distal_r (-0.0003555289 0.003766337 0.03453453)
      PathPoint P2: tibia_proximal_r (-0.01123415 -0.04784984 0.04295943)
    Blankevoort1991Ligament LCL4: linear_stiffness=600 slack_length=0.05499748
      PathPoint P1: femur_distal_r (-2.884417e-5 0.006204925 0.03450143)
      PathPoint P2: tibia_proximal_r (-0.01106773 -0.05028086 0.04377922)
    Blankevoort1991Ligament PT1: linear_stiffness=3000 slack_length=0.04587397
      PathPoint P1: patella_r (0.002258743 -0.009053914 0.01405096)
      PathPoint P2: tibia_proximal_r (0.03102841 -0.04407424 0.0188922)
      PathWrap pathwrap_: wrap_object=PatTen_r method=hybrid
    Blankevoort1991Ligament PT2: linear_stiffness=3000 slack_length=0.04835018
      PathPoint P1: patella_r (0.003260843 -0.01087666 -0.01127575)
      PathPoint P2: tibia_proximal_r (0.03181416 -0.04707732 0.004430968)
      PathWrap pathwrap_: wrap_object=PatTen_r method=hybrid
    Blankevoort1991Ligament PT3: linear_stiffness=3000 slack_length=0.0505992
      PathPoint P1: patella_r (0.005834267 -0.008259742 0.003221792)
      PathPoint P2: tibia_proximal_r (0.03502716 -0.04734208 0.01378336)
      PathWrap pathwrap_: wrap_object=PatTen_r method=hybrid
    Blankevoort1991Ligament PT4: linear_stiffness=3000 slack_length=0.04017204
      PathPoint P1: patella_r (0.002672045 -0.01552739 0.003058116)
      PathPoint P2: tibia_proximal_r (0.03281551 -0.04363834 0.01229979)
      PathWrap pathwrap_: wrap_object=PatTen_r method=hybrid
    Blankevoort1991Ligament PT5: linear_stiffness=3000 slack_length=0.04506114
      PathPoint P1: patella_r (0.003088846 -0.01181371 0.009882947)
      PathPoint P2: tibia_proximal_r (0.03317576 -0.04549446 0.01693206)
      PathWrap pathwrap_: wrap_object=PatTen_r method=hybrid
    Blankevoort1991Ligament PT6: linear_stiffness=3000 slack_length=0.0457967
      PathPoint P1: patella_r (0.005511927 -0.01200982 -0.003583277)
      PathPoint P2: tibia_proximal_r (0.03399651 -0.04574031 0.00941745)
      PathWrap pathwrap_: wrap_object=PatTen_r method=hybrid
    Blankevoort1991Ligament lPFL1: linear_stiffness=150 slack_length=0.03487309
      PathPoint P1: femur_distal_r (0.01891111 0.009455556 0.03352562)
      PathPoint P2: patella_r (-0.001465706 0.01023258 0.01757031)
    Blankevoort1991Ligament lPFL2: linear_stiffness=150 slack_length=0.03740869
      PathPoint P1: femur_distal_r (0.02174778 0.0004727778 0.03252711)
      PathPoint P2: patella_r (-0.0001043988 -0.008198092 0.0162853)
    Blankevoort1991Ligament lPFL3: linear_stiffness=150 slack_length=0.03457101
      PathPoint P1: femur_distal_r (0.01664367 0.005207647 0.03404757)
      PathPoint P2: patella_r (-0.002921105 0.00232301 0.02020936)
    Blankevoort1991Ligament lPFL4: linear_stiffness=150 slack_length=0.03409441
      PathPoint P1: femur_distal_r (0.02363889 0.006646121 0.03203826)
      PathPoint P2: patella_r (0.0008715469 0.003790513 0.01991907)
    Blankevoort1991Ligament lPFL5: linear_stiffness=150 slack_length=0.03380806
      PathPoint P1: femur_distal_r (0.01796556 0.007564445 0.03365327)
      PathPoint P2: patella_r (-0.002425728 0.005741194 0.02003349)
    Blankevoort1991Ligament lPFL6: linear_stiffness=150 slack_length=0.03397176
      PathPoint P1: femur_distal_r (0.01796556 0.002836667 0.03360221)
      PathPoint P2: patella_r (-0.002320961 -0.004402726 0.0194983)
    Blankevoort1991Ligament lPFL7: linear_stiffness=150 slack_length=0.03458825
      PathPoint P1: femur_distal_r (0.02174778 0.008982778 0.03214889)
      PathPoint P2: patella_r (-0.0008232669 0.007479125 0.01952099)
    Blankevoort1991Ligament lPFL8: linear_stiffness=150 slack_length=0.03471693
      PathPoint P1: femur_distal_r (0.02222056 0.004017287 0.03309445)
      PathPoint P2: patella_r (-5.578211e-5 -0.000761392 0.02036821)
    Blankevoort1991Ligament mPFL1: linear_stiffness=150 slack_length=0.04733599
      PathPoint P1: femur_distal_r (0.01401313 0.01404245 -0.03578644)
      PathPoint P2: patella_r (0.0002118139 0.007347693 -0.01781332)
    Blankevoort1991Ligament mPFL2: linear_stiffness=150 slack_length=0.04862666
      PathPoint P1: femur_distal_r (0.01340325 0.00533889 -0.03740145)
      PathPoint P2: patella_r (0.001030656 -0.009145444 -0.01548725)
    Blankevoort1991Ligament mPFL3: linear_stiffness=150 slack_length=0.04792479
      PathPoint P1: femur_distal_r (0.0107642 0.009764752 -0.03797446)
      PathPoint P2: patella_r (0.0002948148 -0.001041276 -0.01960515)
    Blankevoort1991Ligament mPFL4: linear_stiffness=150 slack_length=0.04574274
      PathPoint P1: femur_distal_r (0.01788897 0.00990564 -0.03468865)
      PathPoint P2: patella_r (0.003063695 -4.749749e-5 -0.0195314)
    Blankevoort1991Ligament mPFL5: linear_stiffness=150 slack_length=0.0460079
      PathPoint P1: femur_distal_r (0.0145417 0.01179675 -0.03627813)
      PathPoint P2: patella_r (0.0008356915 0.002636935 -0.01953423)
    Blankevoort1991Ligament mPFL6: linear_stiffness=150 slack_length=0.04658431
      PathPoint P1: femur_distal_r (0.01369637 0.008074477 -0.0371471)
      PathPoint P2: patella_r (0.001528396 -0.004282641 -0.01895839)
    Blankevoort1991Ligament MCLp1: linear_stiffness=500 slack_length=0.0276523
      PathPoint P1: femur_distal_r (-0.007618625 -0.006741055 -0.03287035)
      PathPoint P2: tibia_proximal_r (-0.01602717 -0.03285995 -0.02337697)
      PathWrap pathwrap_: wrap_object=Med_LigP_r method=hybrid
    Blankevoort1991Ligament MCLp2: linear_stiffness=500 slack_length=0.02828819
      PathPoint P1: femur_distal_r (-0.005293787 -0.005996052 -0.03349158)
      PathPoint P2: tibia_proximal_r (-0.01456156 -0.03302447 -0.02537871)
      PathWrap pathwrap_: wrap_object=Med_LigP_r method=hybrid
    Blankevoort1991Ligament MCLp3: linear_stiffness=500 slack_length=0.02803752
      PathPoint P1: femur_distal_r (-0.006896315 -0.009194393 -0.03229734)
      PathPoint P2: tibia_proximal_r (-0.01431949 -0.03530232 -0.02339966)
      PathWrap pathwrap_: wrap_object=Med_LigP_r method=hybrid
    Blankevoort1991Ligament MCLp4: linear_stiffness=500 slack_length=0.02887046
      PathPoint P1: femur_distal_r (-0.004356836 -0.009068634 -0.03289493)
      PathPoint P2: tibia_proximal_r (-0.01222603 -0.03516616 -0.02531252)
      PathWrap pathwrap_: wrap_object=Med_LigP_r method=hybrid
    Blankevoort1991Ligament MCLp5: linear_stiffness=500 slack_length=0.02751368
      PathPoint P1: femur_distal_r (-0.005965037 -0.007914867 -0.03289399)
      PathPoint P2: tibia_proximal_r (-0.0143715 -0.03418183 -0.02429321)
      PathWrap pathwrap_: wrap_object=Med_LigP_r method=hybrid
    Blankevoort1991Ligament PFL1: linear_stiffness=440 slack_length=0.0413951
      PathPoint P1: femur_distal_r (-0.001656235 -0.001064601 0.03293559)
      PathPoint P2: tibia_proximal_r (-0.02241629 -0.03733621 0.03411281)
    Blankevoort1991Ligament PFL2: linear_stiffness=440 slack_length=0.04182533
      PathPoint P1: femur_distal_r (-0.0008898623 -0.006086163 0.03209688)
      PathPoint P2: tibia_proximal_r (-0.02026136 -0.03737592 0.03273041)
    Blankevoort1991Ligament PFL3: linear_stiffness=440 slack_length=0.04645562
      PathPoint P1: femur_distal_r (0.004113167 -0.002572195 0.03477186)
      PathPoint P2: tibia_proximal_r (-0.02202388 -0.03922637 0.03674902)
    Blankevoort1991Ligament PFL4: linear_stiffness=440 slack_length=0.04693795
      PathPoint P1: femur_distal_r (0.003309445 -0.006761668 0.03263774)
      PathPoint P2: tibia_proximal_r (-0.02010346 -0.03940225 0.0366242)
    Blankevoort1991Ligament PFL5: linear_stiffness=440 slack_length=0.04451591
      PathPoint P1: femur_distal_r (0.001607444 -0.00458377 0.03256493)
      PathPoint P2: tibia_proximal_r (-0.02116532 -0.0374752 0.03473404)
    Blankevoort1991Ligament pCAP1: linear_stiffness=500 slack_length=0.05007577
      PathPoint P1: femur_distal_r (-0.009124611 0.01597705 -0.02270184)
      PathPoint P2: tibia_proximal_r (-0.01812914 -0.03136219 -0.01644794)
      PathWrap pathwrap_: wrap_object=Capsule_r
    Blankevoort1991Ligament pCAP2: linear_stiffness=500 slack_length=0.05158677
      PathPoint P1: femur_distal_r (-0.009303321 0.01568015 0.02280018)
      PathPoint P2: tibia_proximal_r (-0.01653304 -0.03374688 0.02024624)
      PathWrap pathwrap_: wrap_object=Capsule_r
    Blankevoort1991Ligament pCAP3: linear_stiffness=500 slack_length=0.06534564
      PathPoint P1: femur_distal_r (-0.009124611 0.01597705 -0.02175629)
      PathPoint P2: tibia_proximal_r (-0.01652453 -0.03375066 0.01930163)
      PathWrap pathwrap_: wrap_object=Capsule_r
    Blankevoort1991Ligament pCAP4: linear_stiffness=500 slack_length=0.06150149
      PathPoint P1: femur_distal_r (-0.009303321 0.01568015 0.02185463)
      PathPoint P2: tibia_proximal_r (-0.01813576 -0.03135841 -0.01550238)
      PathWrap pathwrap_: wrap_object=Capsule_r
    Blankevoort1991Ligament pCAP5: linear_stiffness=500 slack_length=0.05002953
      PathPoint P1: femur_distal_r (-0.009124611 0.01597705 -0.01891962)
      PathPoint P2: tibia_proximal_r (-0.01816034 -0.03134706 -0.01266666)
      PathWrap pathwrap_: wrap_object=Capsule_r
    Blankevoort1991Ligament pCAP6: linear_stiffness=500 slack_length=0.0516331
      PathPoint P1: femur_distal_r (-0.009303321 0.01568015 0.01901796)
      PathPoint P2: tibia_proximal_r (-0.01650278 -0.03376106 0.01646496)
      PathWrap pathwrap_: wrap_object=Capsule_r
    Blankevoort1991Ligament pCAP7: linear_stiffness=500 slack_length=0.04998415
      PathPoint P1: femur_distal_r (-0.009124611 0.01597705 -0.0151374)
      PathPoint P2: tibia_proximal_r (-0.01818965 -0.03133193 -0.008884156)
      PathWrap pathwrap_: wrap_object=Capsule_r
    Blankevoort1991Ligament pCAP8: linear_stiffness=500 slack_length=0.05168104
      PathPoint P1: femur_distal_r (-0.009303321 0.01568015 0.01523574)
      PathPoint P2: tibia_proximal_r (-0.01647158 -0.03377619 0.01268274)
      PathWrap pathwrap_: wrap_object=Capsule_r
    Blankevoort1991Ligament ITB1: linear_stiffness=10000 slack_length=0.4989505
      PathPoint P1: pelvis (-0.07446472 0.04717044 0.1063782)
      PathPoint P2: femur_r (-0.008748454 -0.004111773 0.05249072)
      PathPoint P3: tibia_r (0.01029642 -0.02955454 0.03298668)
    Blankevoort1991Ligament MCLd1_l: linear_stiffness=500 slack_length=0.02998415
      PathPoint P1: femur_distal_l (-0.001702027 -0.0004459789 0.03634079)
      PathPoint P2: tibia_proximal_l (-0.0002097916 -0.03105968 0.03059749)
      PathPoint MCLd1-P1_l: femur_distal_l (-0.001702027 -0.0004459789 0.03634079)
      PathPoint MCLd1-P2_l: tibia_proximal_l (-0.0002097916 -0.03105968 0.03059749)
      PathWrap pathwrap_: wrap_object=Med_Lig_l method=hybrid
    Smith2018ArticularContactForce tf_contact: socket_target_mesh=/contactgeometryset/femur_cartilage
        socket_casting_mesh=/contactgeometryset/tibia_cartilage min_proximity=0 max_proximity=0.02
        elastic_foundation_formulation=nonlinear use_lumped_contact_model=false
      # Combine the thickness and the average material properties between the Smith2018ContactMeshes for both meshes and use Bei & Fregly 2003 lumped parameter Elastic Foundation model.
    Smith2018ArticularContactForce pf_contact: socket_target_mesh=/contactgeometryset/femur_cartilage
        socket_casting_mesh=/contactgeometryset/patella_cartilage min_proximity=0 max_proximity=0.02
        elastic_foundation_formulation=nonlinear use_lumped_contact_model=false
      # Combine the thickness and the average material properties between the Smith2018ContactMeshes for both meshes and use Bei & Fregly 2003 lumped parameter Elastic Foundation model.
    SpringGeneralizedForce knee_flex_r: coordinate=knee_flex_r stiffness=0 rest_length=0 viscosity=0.1
    SpringGeneralizedForce knee_add_r: coordinate=knee_add_r stiffness=0 rest_length=0 viscosity=6
    SpringGeneralizedForce knee_rot_r: coordinate=knee_rot_r stiffness=0 rest_length=0 viscosity=6
    SpringGeneralizedForce knee_tx_r: coordinate=knee_tx_r stiffness=0 rest_length=0 viscosity=200
    SpringGeneralizedForce knee_ty_r: coordinate=knee_ty_r stiffness=0 rest_length=0 viscosity=200
    SpringGeneralizedForce knee_tz_r: coordinate=knee_tz_r stiffness=0 rest_length=0 viscosity=200
    SpringGeneralizedForce pf_flex_r: coordinate=pf_flex_r stiffness=0 rest_length=0 viscosity=2
    SpringGeneralizedForce pf_rot_r: coordinate=pf_rot_r stiffness=0 rest_length=0 viscosity=2
    SpringGeneralizedForce pf_tilt_r: coordinate=pf_tilt_r stiffness=0 rest_length=0 viscosity=2
    SpringGeneralizedForce pf_tx_r: coordinate=pf_tx_r stiffness=0 rest_length=0 viscosity=30
    SpringGeneralizedForce pf_ty_r: coordinate=pf_ty_r stiffness=0 rest_length=0 viscosity=30
    SpringGeneralizedForce pf_tz_r: coordinate=pf_tz_r stiffness=0 rest_length=0 viscosity=30
    SpringGeneralizedForce knee_flex_l: coordinate=knee_flex_l stiffness=0 rest_length=0 viscosity=0.1
    SpringGeneralizedForce knee_add_l: coordinate=knee_add_l stiffness=0 rest_length=0 viscosity=6
    SpringGeneralizedForce knee_rot_l: coordinate=knee_rot_l stiffness=0 rest_length=0 viscosity=6
    SpringGeneralizedForce knee_tx_l: coordinate=knee_tx_l stiffness=0 rest_length=0 viscosity=200
    SpringGeneralizedForce knee_ty_l: coordinate=knee_ty_l stiffness=0 rest_length=0 viscosity=200
    SpringGeneralizedForce knee_tz_l: coordinate=knee_tz_l stiffness=0 rest_length=0 viscosity=200
    SpringGeneralizedForce pf_flex_l: coordinate=pf_flex_l stiffness=0 rest_length=0 viscosity=2
    SpringGeneralizedForce pf_rot_l: coordinate=pf_rot_l stiffness=0 rest_length=0 viscosity=2
    SpringGeneralizedForce pf_tilt_l: coordinate=pf_tilt_l stiffness=0 rest_length=0 viscosity=2
    SpringGeneralizedForce pf_tx_l: coordinate=pf_tx_l stiffness=0 rest_length=0 viscosity=30
    SpringGeneralizedForce pf_ty_l: coordinate=pf_ty_l stiffness=0 rest_length=0 viscosity=30
    SpringGeneralizedForce pf_tz_l: coordinate=pf_tz_l stiffness=0 rest_length=0 viscosity=30
    Blankevoort1991Ligament MCLd2_l: linear_stiffness=500 slack_length=0.03186433
      PathPoint MCLd2-P1_l: femur_distal_l (0.002817925 -0.0006574086 0.03708771)
      PathPoint MCLd2-P2_l: tibia_proximal_l (0.004823109 -0.0304834 0.03059749)
      PathWrap pathwrap_: wrap_object=Med_Lig_l method=hybrid
    Blankevoort1991Ligament MCLd3_l: linear_stiffness=500 slack_length=0.03619687
      PathPoint MCLd3-P1_l: femur_distal_l (0.003780928 0.003590687 0.03806086)
      PathPoint MCLd3-P2_l: tibia_proximal_l (0.005284816 -0.0318144 0.03068329)
      PathWrap pathwrap_: wrap_object=Med_Lig_l method=hybrid
    Blankevoort1991Ligament MCLd4_l: linear_stiffness=500 slack_length=0.03241633
      PathPoint MCLd4-P1_l: femur_distal_l (0.0009378165 0.001406964 0.03728371)
      PathPoint MCLd4-P2_l: tibia_proximal_l (0.002543241 -0.03160671 0.03064429)
      PathWrap pathwrap_: wrap_object=Med_Lig_l method=hybrid
    Blankevoort1991Ligament MCLd5_l: linear_stiffness=500 slack_length=0.03635132
      PathPoint MCLd5-P1_l: femur_distal_l (-0.00105554 0.004571437 0.03770592)
      PathPoint MCLd5-P2_l: tibia_proximal_l (-9.059309e-5 -0.03255548 0.03064137)
      PathWrap pathwrap_: wrap_object=Med_Lig_l method=hybrid
    Blankevoort1991Ligament MCLs1_l: linear_stiffness=500 slack_length=0.07051863
      PathPoint MCLs1-P1_l: femur_distal_l (0.005237134 0.008131702 0.03963759)
      PathPoint MCLs1-P2_l: tibia_proximal_l (0.01396628 -0.05960849 0.01508081)
      PathWrap pathwrap_: wrap_object=Med_Lig_l method=hybrid
    Blankevoort1991Ligament MCLs2_l: linear_stiffness=500 slack_length=0.08756172
      PathPoint MCLs2-P1_l: femur_distal_l (0.005492316 0.01489457 0.03958396)
      PathPoint MCLs2-P2_l: tibia_proximal_l (0.01875496 -0.06965879 0.01066948)
      PathWrap pathwrap_: wrap_object=Med_Lig_l method=hybrid
    Blankevoort1991Ligament MCLs3_l: linear_stiffness=500 slack_length=0.0695801
      PathPoint MCLs3-P1_l: femur_distal_l (-0.0003950302 0.01612904 0.03790972)
      PathPoint MCLs3-P2_l: tibia_proximal_l (0.001153927 -0.05408848 0.02100548)
      PathWrap pathwrap_: wrap_object=Med_Lig_l method=hybrid
    Blankevoort1991Ligament MCLs4_l: linear_stiffness=500 slack_length=0.08022023
      PathPoint MCLs4-P1_l: femur_distal_l (-0.001122041 0.007891536 0.03849868)
      PathPoint MCLs4-P2_l: tibia_proximal_l (0.006354495 -0.07296534 0.01690911)
      PathWrap pathwrap_: wrap_object=Med_Lig_l method=hybrid
    Blankevoort1991Ligament MCLs5_l: linear_stiffness=500 slack_length=0.07619153
      PathPoint MCLs5-P1_l: femur_distal_l (0.002438418 0.01124674 0.03961223)
      PathPoint MCLs5-P2_l: tibia_proximal_l (0.01162215 -0.06412416 0.01603445)
      PathWrap pathwrap_: wrap_object=Med_Lig_l method=hybrid
    Blankevoort1991Ligament MCLs6_l: linear_stiffness=500 slack_length=0.07226288
      PathPoint MCLs6-P1_l: femur_distal_l (0.0008975939 0.01308869 0.03926315)
      PathPoint MCLs6-P2_l: tibia_proximal_l (0.006989379 -0.05923698 0.01899581)
      PathWrap pathwrap_: wrap_object=Med_Lig_l method=hybrid
    Blankevoort1991Ligament ACLpl1_l: linear_stiffness=820 slack_length=0.02448374
      PathPoint ACLpl1-P1_l: femur_distal_l (-0.003740559 -3.010799e-5 -0.006904448)
      PathPoint ACLpl1-P2_l: tibia_proximal_l (0.009883556 -0.01997188 0.0003528476)
    Blankevoort1991Ligament ACLpl2_l: linear_stiffness=820 slack_length=0.02241732
      PathPoint ACLpl2-P1_l: femur_distal_l (-0.003767862 -0.00297199 -0.007056855)
      PathPoint ACLpl2-P2_l: tibia_proximal_l (0.009820175 -0.02079096 -0.003818274)
    Blankevoort1991Ligament ACLpl3_l: linear_stiffness=820 slack_length=0.027234
      PathPoint ACLpl3-P1_l: femur_distal_l (-0.001227156 -0.0005990785 -0.005634095)
      PathPoint ACLpl3-P2_l: tibia_proximal_l (0.01377126 -0.02125023 -0.00139692)
    Blankevoort1991Ligament ACLpl4_l: linear_stiffness=820 slack_length=0.02471201
      PathPoint ACLpl4-P1_l: femur_distal_l (-0.0004849534 -0.004723552 -0.006037882)
      PathPoint ACLpl4-P2_l: tibia_proximal_l (0.01395458 -0.0209304 -0.004715069)
    Blankevoort1991Ligament ACLpl5_l: linear_stiffness=820 slack_length=0.02385139
      PathPoint ACLpl5-P1_l: femur_distal_l (-0.001487506 -0.002134092 -0.00611823)
      PathPoint ACLpl5-P2_l: tibia_proximal_l (0.01189713 -0.02077341 -0.001669752)
    Blankevoort1991Ligament ACLpl6_l: linear_stiffness=820 slack_length=0.02448179
      PathPoint ACLpl6-P1_l: femur_distal_l (-0.002670978 -0.003087344 -0.006632982)
      PathPoint ACLpl6-P2_l: tibia_proximal_l (0.01221891 -0.02142867 -0.004219818)
    Blankevoort1991Ligament ACLam1_l: linear_stiffness=820 slack_length=0.03331995
      PathPoint ACLam1-P1_l: femur_distal_l (0.001139398 0.003110258 -0.002550847)
      PathPoint ACLam1-P2_l: tibia_proximal_l (0.01602763 -0.0201513 0.00508853)
    Blankevoort1991Ligament ACLam2_l: linear_stiffness=820 slack_length=0.02920271
      PathPoint ACLam2-P1_l: femur_distal_l (-0.001139983 0.00103633 -0.005080924)
      PathPoint ACLam2-P2_l: tibia_proximal_l (0.01459911 -0.02110299 0.0005566619)
    Blankevoort1991Ligament ACLam3_l: linear_stiffness=820 slack_length=0.02948315
      PathPoint ACLam3-P1_l: femur_distal_l (-0.0009130784 0.003605119 -0.004064388)
      PathPoint ACLam3-P2_l: tibia_proximal_l (0.01164165 -0.0191333 0.003750993)
    Blankevoort1991Ligament ACLam4_l: linear_stiffness=820 slack_length=0.0337212
      PathPoint ACLam4-P1_l: femur_distal_l (0.0008278746 0.001000057 -0.003951667)
      PathPoint ACLam4-P2_l: tibia_proximal_l (0.01805582 -0.02160614 0.001807825)
    Blankevoort1991Ligament ACLam5_l: linear_stiffness=820 slack_length=0.03297974
      PathPoint ACLam5-P1_l: femur_distal_l (0.000550587 0.002483273 -0.003476211)
      PathPoint ACLam5-P2_l: tibia_proximal_l (0.01573022 -0.02040872 0.003592735)
    Blankevoort1991Ligament ACLam6_l: linear_stiffness=820 slack_length=0.03275127
      PathPoint ACLam6-P1_l: femur_distal_l (-0.0005590606 0.00168038 -0.004493917)
      PathPoint ACLam6-P2_l: tibia_proximal_l (0.01597887 -0.02119855 0.001311989)
    Blankevoort1991Ligament PCLal1_l: linear_stiffness=900 slack_length=0.03334764
      PathPoint PCLal1-P1_l: femur_distal_l (0.001036818 -0.002579807 0.01044229)
      PathPoint PCLal1-P2_l: tibia_proximal_l (-0.0136991 -0.03060821 -0.002863657)
    Blankevoort1991Ligament PCLal2_l: linear_stiffness=900 slack_length=0.03046985
      PathPoint PCLal2-P1_l: femur_distal_l (0.006934091 -0.004612196 0.004531751)
      PathPoint PCLal2-P2_l: tibia_proximal_l (-0.009847478 -0.02502092 -0.002808272)
    Blankevoort1991Ligament PCLal3_l: linear_stiffness=900 slack_length=0.03173805
      PathPoint PCLal3-P1_l: femur_distal_l (0.004547255 -0.0008654645 0.006864762)
      PathPoint PCLal3-P2_l: tibia_proximal_l (-0.01175476 -0.02743623 -0.002978426)
    Blankevoort1991Ligament PCLal4_l: linear_stiffness=900 slack_length=0.03260862
      PathPoint PCLal4-P1_l: femur_distal_l (0.004692642 -0.004415422 0.007947019)
      PathPoint PCLal4-P2_l: tibia_proximal_l (-0.01237882 -0.03001925 0.002205176)
    Blankevoort1991Ligament PCLal5_l: linear_stiffness=900 slack_length=0.03256006
      PathPoint PCLal5-P1_l: femur_distal_l (0.004892633 -0.003345841 0.007366253)
      PathPoint PCLal5-P2_l: tibia_proximal_l (-0.01210092 -0.02906561 -0.000873236)
    Blankevoort1991Ligament PCLpm1_l: linear_stiffness=300 slack_length=0.03348308
      PathPoint PCLpm1-P1_l: femur_distal_l (0.004440092 -0.005358631 0.008800812)
      PathPoint PCLpm1-P2_l: tibia_proximal_l (-0.01357039 -0.03098362 0.003251647)
    Blankevoort1991Ligament PCLpm2_l: linear_stiffness=300 slack_length=0.03483622
      PathPoint PCLpm2-P1_l: femur_distal_l (0.002157396 -0.00806013 0.01038573)
      PathPoint PCLpm2-P2_l: tibia_proximal_l (-0.01662731 -0.03196164 0.006431917)
    Blankevoort1991Ligament PCLpm3_l: linear_stiffness=300 slack_length=0.02983837
      PathPoint PCLpm3-P1_l: femur_distal_l (0.001769601 -0.006011067 0.01046666)
      PathPoint PCLpm3-P2_l: tibia_proximal_l (-0.01289855 -0.02887839 0.006528842)
    Blankevoort1991Ligament PCLpm4_l: linear_stiffness=300 slack_length=0.03866386
      PathPoint PCLpm4-P1_l: femur_distal_l (0.006346109 -0.00764981 0.007850875)
      PathPoint PCLpm4-P2_l: tibia_proximal_l (-0.01585698 -0.03261008 0.00139692)
    Blankevoort1991Ligament PCLpm5_l: linear_stiffness=300 slack_length=0.03422308
      PathPoint PCLpm5-P1_l: femur_distal_l (0.004755145 -0.007629333 0.009492446)
      PathPoint PCLpm5-P2_l: tibia_proximal_l (-0.01441579 -0.03124885 0.004667192)
    Blankevoort1991Ligament LCL1_l: linear_stiffness=600 slack_length=0.04794042
      PathPoint LCL1-P1_l: femur_distal_l (-0.00211732 0.002025856 -0.03458172)
      PathPoint LCL1-P2_l: tibia_proximal_l (-0.01288782 -0.04706683 -0.04208215)
    Blankevoort1991Ligament LCL2_l: linear_stiffness=600 slack_length=0.05431744
      PathPoint LCL2-P1_l: femur_distal_l (-0.002136334 0.005894445 -0.03475431)
      PathPoint LCL2-P2_l: tibia_proximal_l (-0.01447235 -0.04950652 -0.0444292)
    Blankevoort1991Ligament LCL3_l: linear_stiffness=600 slack_length=0.05196931
      PathPoint LCL3-P1_l: femur_distal_l (-0.0003666355 0.003883996 -0.03561337)
      PathPoint LCL3-P2_l: tibia_proximal_l (-0.0115851 -0.04934465 -0.04430146)
    Blankevoort1991Ligament LCL4_l: linear_stiffness=600 slack_length=0.05671558
      PathPoint LCL4-P1_l: femur_distal_l (-2.974525e-5 0.006398764 -0.03557924)
      PathPoint LCL4-P2_l: tibia_proximal_l (-0.01141348 -0.05185162 -0.04514687)
    Blankevoort1991Ligament PT1_l: linear_stiffness=3000 slack_length=0.04635642
      PathPoint PT1-P1_l: patella_l (0.002329305 -0.009336755 -0.0144899)
      PathPoint PT1-P2_l: tibia_proximal_l (0.03199772 -0.0454511 -0.01948239)
      PathWrap pathwrap_: wrap_object=PatTen_l method=hybrid
    Blankevoort1991Ligament PT2_l: linear_stiffness=3000 slack_length=0.04897609
      PathPoint PT2-P1_l: patella_l (0.00336271 -0.01121644 0.011628)
      PathPoint PT2-P2_l: tibia_proximal_l (0.03280802 -0.048548 -0.00456939)
      PathWrap pathwrap_: wrap_object=PatTen_l method=hybrid
    Blankevoort1991Ligament PT3_l: linear_stiffness=3000 slack_length=0.05127627
      PathPoint PT3-P1_l: patella_l (0.006016527 -0.008517773 -0.003322439)
      PathPoint PT3-P2_l: tibia_proximal_l (0.0361214 -0.04882102 -0.01421395)
      PathWrap pathwrap_: wrap_object=PatTen_l method=hybrid
    Blankevoort1991Ligament PT4_l: linear_stiffness=3000 slack_length=0.04041382
      PathPoint PT4-P1_l: patella_l (0.002755519 -0.01601246 -0.00315365)
      PathPoint PT4-P2_l: tibia_proximal_l (0.03384065 -0.04500158 -0.01268403)
      PathWrap pathwrap_: wrap_object=PatTen_l method=hybrid
    Blankevoort1991Ligament PT5_l: linear_stiffness=3000 slack_length=0.04552157
      PathPoint PT5-P1_l: patella_l (0.003185341 -0.01218276 -0.01019169)
      PathPoint PT5-P2_l: tibia_proximal_l (0.03421216 -0.04691569 -0.01746101)
      PathWrap pathwrap_: wrap_object=PatTen_l method=hybrid
    Blankevoort1991Ligament PT6_l: linear_stiffness=3000 slack_length=0.04629114
      PathPoint PT6-P1_l: patella_l (0.005684118 -0.012385 0.003695218)
      PathPoint PT6-P2_l: tibia_proximal_l (0.03505854 -0.04716921 -0.009711647)
      PathWrap pathwrap_: wrap_object=PatTen_l method=hybrid
    Blankevoort1991Ligament lPFL1_l: linear_stiffness=150 slack_length=0.03446762
      PathPoint lPFL1-P1_l: femur_distal_l (0.01950189 0.009750944 -0.03457295)
      PathPoint lPFL1-P2_l: patella_l (-0.001511494 0.01055224 -0.0181192)
    Blankevoort1991Ligament lPFL2_l: linear_stiffness=150 slack_length=0.03695516
      PathPoint lPFL2-P1_l: femur_distal_l (0.02242717 0.0004875472 -0.03354325)
      PathPoint lPFL2-P2_l: patella_l (-0.0001076602 -0.008454197 -0.01679405)
    Blankevoort1991Ligament lPFL3_l: linear_stiffness=150 slack_length=0.03411175
      PathPoint lPFL3-P1_l: femur_distal_l (0.01716361 0.005370332 -0.0351112)
      PathPoint lPFL3-P2_l: patella_l (-0.003012359 0.00239558 -0.02084069)
    Blankevoort1991Ligament lPFL4_l: linear_stiffness=150 slack_length=0.03345498
      PathPoint lPFL4-P1_l: femur_distal_l (0.02437736 0.006853743 -0.03303912)
      PathPoint lPFL4-P2_l: patella_l (0.0008987737 0.003908927 -0.02054134)
    Blankevoort1991Ligament lPFL5_l: linear_stiffness=150 slack_length=0.03332427
      PathPoint lPFL5-P1_l: femur_distal_l (0.01852679 0.007800755 -0.03470458)
      PathPoint lPFL5-P2_l: patella_l (-0.002501507 0.005920546 -0.02065932)
    Blankevoort1991Ligament lPFL6_l: linear_stiffness=150 slack_length=0.03352296
      PathPoint lPFL6-P1_l: femur_distal_l (0.01852679 0.002925283 -0.03465193)
      PathPoint lPFL6-P2_l: patella_l (-0.002393467 -0.004540266 -0.02010742)
    Blankevoort1991Ligament lPFL7_l: linear_stiffness=150 slack_length=0.0339717
      PathPoint lPFL7-P1_l: femur_distal_l (0.02242717 0.009263396 -0.03315321)
      PathPoint lPFL7-P2_l: patella_l (-0.0008489854 0.00771277 -0.02013082)
    Blankevoort1991Ligament lPFL8_l: linear_stiffness=150 slack_length=0.0341123
      PathPoint lPFL8-P1_l: femur_distal_l (0.02291472 0.004142786 -0.0341283)
      PathPoint lPFL8-P2_l: patella_l (-5.752472e-5 -0.0007851775 -0.02100451)
    Blankevoort1991Ligament mPFL1_l: linear_stiffness=150 slack_length=0.04724376
      PathPoint mPFL1-P1_l: femur_distal_l (0.0144509 0.01448113 0.0369044)
      PathPoint mPFL1-P2_l: patella_l (0.0002184309 0.007577232 0.0183698)
    Blankevoort1991Ligament mPFL2_l: linear_stiffness=150 slack_length=0.04876236
      PathPoint mPFL2-P1_l: femur_distal_l (0.01382196 0.005505675 0.03856986)
      PathPoint mPFL2-P2_l: patella_l (0.001062853 -0.009431144 0.01597107)
    Blankevoort1991Ligament mPFL3_l: linear_stiffness=150 slack_length=0.04794854
      PathPoint mPFL3-P1_l: femur_distal_l (0.01110047 0.0100698 0.03916076)
      PathPoint mPFL3-P2_l: patella_l (0.0003040247 -0.001073805 0.02021761)
    Blankevoort1991Ligament mPFL4_l: linear_stiffness=150 slack_length=0.04557416
      PathPoint mPFL4-P1_l: femur_distal_l (0.01844781 0.01021509 0.03577231)
      PathPoint mPFL4-P2_l: patella_l (0.003159403 -4.89813e-5 0.02014155)
    Blankevoort1991Ligament mPFL5_l: linear_stiffness=150 slack_length=0.0459035
      PathPoint mPFL5-P1_l: femur_distal_l (0.01499598 0.01216528 0.03741145)
      PathPoint mPFL5-P2_l: patella_l (0.0008617981 0.002719312 0.02014447)
    Blankevoort1991Ligament mPFL6_l: linear_stiffness=150 slack_length=0.04658926
      PathPoint mPFL6-P1_l: femur_distal_l (0.01412424 0.008326721 0.03830756)
      PathPoint mPFL6-P2_l: patella_l (0.001576143 -0.004416429 0.01955064)
    Blankevoort1991Ligament MCLp1_l: linear_stiffness=500 slack_length=0.02851615
      PathPoint MCLp1-P1_l: femur_distal_l (-0.007856628 -0.006951643 0.03389721)
      PathPoint MCLp1-P2_l: tibia_proximal_l (-0.01652785 -0.03388648 0.02410726)
      PathWrap pathwrap_: wrap_object=Med_LigP_l method=hybrid
    Blankevoort1991Ligament MCLp2_l: linear_stiffness=500 slack_length=0.0291719
      PathPoint MCLp2-P1_l: femur_distal_l (-0.005459163 -0.006183366 0.03453784)
      PathPoint MCLp2-P2_l: tibia_proximal_l (-0.01501645 -0.03405615 0.02617153)
      PathWrap pathwrap_: wrap_object=Med_LigP_l method=hybrid
    Blankevoort1991Ligament MCLp3_l: linear_stiffness=500 slack_length=0.0289134
      PathPoint MCLp3-P1_l: femur_distal_l (-0.007111753 -0.009481623 0.0333063)
      PathPoint MCLp3-P2_l: tibia_proximal_l (-0.01476683 -0.03640515 0.02413066)
      PathWrap pathwrap_: wrap_object=Med_LigP_l method=hybrid
    Blankevoort1991Ligament MCLp4_l: linear_stiffness=500 slack_length=0.02977236
      PathPoint MCLp4-P1_l: femur_distal_l (-0.004492942 -0.009351935 0.03392256)
      PathPoint MCLp4-P2_l: tibia_proximal_l (-0.01260797 -0.03626473 0.02610328)
      PathWrap pathwrap_: wrap_object=Med_LigP_l method=hybrid
    Blankevoort1991Ligament MCLp5_l: linear_stiffness=500 slack_length=0.0283732
      PathPoint MCLp5-P1_l: femur_distal_l (-0.006151383 -0.008162125 0.03392158)
      PathPoint MCLp5-P2_l: tibia_proximal_l (-0.01482046 -0.03524966 0.02505212)
      PathWrap pathwrap_: wrap_object=Med_LigP_l method=hybrid
    Blankevoort1991Ligament PFL1_l: linear_stiffness=440 slack_length=0.04268827
      PathPoint PFL1-P1_l: femur_distal_l (-0.001707975 -0.001097859 -0.03396449)
      PathPoint PFL1-P2_l: tibia_proximal_l (-0.02311656 -0.03850258 -0.03517848)
    Blankevoort1991Ligament PFL2_l: linear_stiffness=440 slack_length=0.04313193
      PathPoint PFL2-P1_l: femur_distal_l (-0.0009176613 -0.006276292 -0.03309958)
      PathPoint PFL2-P2_l: tibia_proximal_l (-0.02089432 -0.03854353 -0.03375289)
    Blankevoort1991Ligament PFL3_l: linear_stiffness=440 slack_length=0.04790687
      PathPoint PFL3-P1_l: femur_distal_l (0.00424166 -0.002652549 -0.03585812)
      PathPoint PFL3-P2_l: tibia_proximal_l (-0.0227119 -0.04045179 -0.03789704)
    Blankevoort1991Ligament PFL4_l: linear_stiffness=440 slack_length=0.04840427
      PathPoint PFL4-P1_l: femur_distal_l (0.00341283 -0.0069729 -0.03365733)
      PathPoint PFL4-P2_l: tibia_proximal_l (-0.02073148 -0.04063316 -0.03776833)
    Blankevoort1991Ligament PFL5_l: linear_stiffness=440 slack_length=0.04590656
      PathPoint PFL5-P1_l: femur_distal_l (0.00165766 -0.004726965 -0.03358225)
      PathPoint PFL5-P2_l: tibia_proximal_l (-0.02182651 -0.03864591 -0.03581912)
    Blankevoort1991Ligament pCAP1_l: linear_stiffness=500 slack_length=0.05164012
      PathPoint pCAP1-P1_l: femur_distal_l (-0.009409661 0.01647617 0.02341104)
      PathPoint pCAP1-P2_l: tibia_proximal_l (-0.01869548 -0.03234193 0.01696177)
      PathWrap pathwrap_: wrap_object=Capsule_l
    Blankevoort1991Ligament pCAP2_l: linear_stiffness=500 slack_length=0.05319832
      PathPoint pCAP2-P1_l: femur_distal_l (-0.009593953 0.01616999 -0.02351245)
      PathPoint pCAP2-P2_l: tibia_proximal_l (-0.01704952 -0.03480112 -0.02087872)
      PathWrap pathwrap_: wrap_object=Capsule_l
    Blankevoort1991Ligament pCAP3_l: linear_stiffness=500 slack_length=0.06738701
      PathPoint pCAP3-P1_l: femur_distal_l (-0.009409661 0.01647617 0.02243595)
      PathPoint pCAP3-P2_l: tibia_proximal_l (-0.01704075 -0.03480502 -0.0199046)
      PathWrap pathwrap_: wrap_object=Capsule_l
    Blankevoort1991Ligament pCAP4_l: linear_stiffness=500 slack_length=0.06342277
      PathPoint pCAP4-P1_l: femur_distal_l (-0.009593953 0.01616999 -0.02253736)
      PathPoint pCAP4-P2_l: tibia_proximal_l (-0.01870231 -0.03233803 0.01598667)
      PathWrap pathwrap_: wrap_object=Capsule_l
    Blankevoort1991Ligament pCAP5_l: linear_stiffness=500 slack_length=0.05159244
      PathPoint pCAP5-P1_l: femur_distal_l (-0.009409661 0.01647617 0.01951066)
      PathPoint pCAP5-P2_l: tibia_proximal_l (-0.01872766 -0.03232633 0.01306236)
      PathWrap pathwrap_: wrap_object=Capsule_l
    Blankevoort1991Ligament pCAP6_l: linear_stiffness=500 slack_length=0.0532461
      PathPoint pCAP6-P1_l: femur_distal_l (-0.009593953 0.01616999 -0.01961207)
      PathPoint pCAP6-P2_l: tibia_proximal_l (-0.01701832 -0.03481574 -0.01697932)
      PathWrap pathwrap_: wrap_object=Capsule_l
    Blankevoort1991Ligament pCAP7_l: linear_stiffness=500 slack_length=0.05154563
      PathPoint pCAP7-P1_l: femur_distal_l (-0.009409661 0.01647617 0.01561029)
      PathPoint pCAP7-P2_l: tibia_proximal_l (-0.01875789 -0.03231073 0.009161694)
      PathWrap pathwrap_: wrap_object=Capsule_l
    Blankevoort1991Ligament pCAP8_l: linear_stiffness=500 slack_length=0.05329554
      PathPoint pCAP8-P1_l: femur_distal_l (-0.009593953 0.01616999 -0.0157117)
      PathPoint pCAP8-P2_l: tibia_proximal_l (-0.01698614 -0.03483135 -0.01307894)
      PathWrap pathwrap_: wrap_object=Capsule_l
    Blankevoort1991Ligament ITB1_l: linear_stiffness=10000 slack_length=0.5110722
      PathPoint ITB1-P1_l: pelvis (-0.07446472 0.04717044 -0.1063782)
      PathPoint ITB1-P2_l: femur_l (-0.009021752 -0.004240223 -0.05413051)
      PathPoint ITB1-P3_l: tibia_l (0.01061808 -0.03047781 -0.03401717)
    Smith2018ArticularContactForce tf_contact_l: socket_target_mesh=/contactgeometryset/femur_cartilage_l
        socket_casting_mesh=/contactgeometryset/tibia_cartilage_l min_proximity=0 max_proximity=0.02
        elastic_foundation_formulation=nonlinear use_lumped_contact_model=false
      # Combine the thickness and the average material properties between the Smith2018ContactMeshes for both meshes and use Bei & Fregly 2003 lumped parameter Elastic Foundation model.
    Smith2018ArticularContactForce pf_contact_l: socket_target_mesh=/contactgeometryset/femur_cartilage_l
        socket_casting_mesh=/contactgeometryset/patella_cartilage_l min_proximity=0 max_proximity=0.02
        elastic_foundation_formulation=nonlinear use_lumped_contact_model=false
      # Combine the thickness and the average material properties between the Smith2018ContactMeshes for both meshes and use Bei & Fregly 2003 lumped parameter Elastic Foundation model.
    ObjectGroup hip_add_r: members=(addbrev_r addlong_r addmagDist_r addmagIsch_r addmagMid_r addmagProx_r bflh_r grac_r pect_r semimem_r semiten_r)
    ObjectGroup hip_add_l: members=(addbrev_l addlong_l addmagDist_l addmagIsch_l addmagMid_l addmagProx_l bflh_l grac_l pect_l semimem_l semiten_l)
    ObjectGroup hip_flex_r: members=(addbrev_r addlong_r glmin1_r grac_r iliacus_r pect_r psoas_r recfem_r sart_r tfl_r)
    ObjectGroup hip_flex_l: members=(addbrev_l addlong_l glmin1_l grac_l iliacus_l pect_l psoas_l recfem_l sart_l tfl_l)
    ObjectGroup hip_ext_r: members=(addlong_r addmagDist_r addmagIsch_r addmagMid_r addmagProx_r bflh_r glmax1_r glmax2_r glmax3_r glmed1_r glmed2_r glmed3_r glmin3_r semimem_r semiten_r)
    ObjectGroup hip_ext_l: members=(addlong_l addmagDist_l addmagIsch_l addmagMid_l addmagProx_l bflh_l glmax1_l glmax2_l glmax3_l glmed1_l glmed2_l glmed3_l glmin3_l semimem_l semiten_l)
    ObjectGroup knee_flex_r: members=(bflh_r bfsh_r gaslat_r gasmed_r grac_r sart_r semimem_r semiten_r)
    ObjectGroup knee_flex_l: members=(bflh_l bfsh_l gaslat_l gasmed_l grac_l sart_l semimem_l semiten_l)
    ObjectGroup ankle_df_r: members=(edl_r ehl_r pertert_r tibant_r)
    ObjectGroup ankle_df_l: members=(edl_l ehl_l pertert_l tibant_l)
    ObjectGroup everter_r: members=(edl_r perbrev_r perlong_r pertert_r)
    ObjectGroup everter_l: members=(edl_l perbrev_l perlong_l pertert_l)
    ObjectGroup inverter_r: members=(ehl_r fdl_r fhl_r tibant_r tibpost_r)
    ObjectGroup inverter_l: members=(ehl_l fdl_l fhl_l tibant_l tibpost_l)
    ObjectGroup ankle_pf_r: members=(fdl_r fhl_r gaslat_r gasmed_r perbrev_r perlong_r soleus_r tibpost_r)
    ObjectGroup ankle_pf_l: members=(fdl_l fhl_l gaslat_l gasmed_l perbrev_l perlong_l soleus_l tibpost_l)
    ObjectGroup hip_exrot_r: members=(gem_r glmin3_r piri_r quadfem_r)
    ObjectGroup hip_exrot_l: members=(gem_l glmin3_l piri_l quadfem_l)
    ObjectGroup hip_abd_r: members=(glmax1_r glmed1_r glmed2_r glmed3_r glmin1_r glmin2_r glmin3_r piri_r sart_r tfl_r)
    ObjectGroup hip_abd_l: members=(glmax1_l glmed1_l glmed2_l glmed3_l glmin1_l glmin2_l glmin3_l piri_l sart_l tfl_l)
    ObjectGroup hip_inrot_r: members=(glmed1_r glmed2_r glmed3_r glmin1_r iliacus_r psoas_r tfl_r)
    ObjectGroup hip_inrot_l: members=(glmed1_l glmed2_l glmed3_l glmin1_l iliacus_l psoas_l tfl_l)
    ObjectGroup knee_ext_r: members=(recfem_r vasint_r vaslat_r vasmed_r)
    ObjectGroup knee_ext_l: members=(recfem_l vasint_l vaslat_l vasmed_l)
    ObjectGroup knee_abd_r
    ObjectGroup knee_abd_l
  MarkerSet:
    Marker r.should: torso (-0.01079854 0.3953956 0.1479514)
    Marker l.should: torso (-0.01144087 0.4049168 -0.151842)
    Marker c7: torso (-0.08899545 0.4298393 0.002705243)
    Marker r.asis: pelvis (0.04814006 -0.02055428 0.1612524)
    Marker l.asis: pelvis (0.04665389 -0.05423033 -0.157797)
    Marker sacrum: pelvis (-0.2154541 -0.03461853 0.003660939)
    Marker r.bar1: femur_r (0.04659269 -0.0549119 0.1082573)
    Marker r.knee1: femur_r (-0.007292939 -0.314448 0.06493824)
    Marker r.kneem: femur_r (0.009606628 -0.3491186 -0.07635228)
    Marker r.bar2: tibia_r (-0.01896069 -0.03979278 0.07026538)
    Marker r.mall: tibia_r (-0.008578295 -0.3808828 0.05050957)
    Marker r.mallm: tibia_r (-0.01131265 -0.3629162 -0.03235593)
    Marker r.heel: calcn_r (-0.01330563 0.01735004 -0.002966133)
    Marker r.met: calcn_r (0.1917873 0.01544149 -0.008681901)
    Marker l.bar1: femur_l (0.04384347 -0.07870513 -0.09494126)
    Marker l.knee1: femur_l (0.0005165465 -0.3083427 -0.06493827)
    Marker l.kneem: femur_l (0.007434975 -0.3705519 0.08357953)
    Marker l.bar2: tibia_l (-0.01944715 -0.04115953 -0.06722038)
    Marker l.mall: tibia_l (-0.01808912 -0.3799485 -0.04739239)
    Marker l.mallm: tibia_l (-0.01989339 -0.3794739 0.04388425)
    Marker l.heel: calcn_l (-0.02052277 0.01535762 -0.00733389)
    Marker l.met: calcn_l (0.1772499 0.01717128 -0.006701033)
  ContactGeometrySet:
    Smith2018ContactMesh [values shared by the 6 below unless stated]: socket_scale_frame=/ground
        elastic_modulus=5000000 poissons_ratio=0.45 thickness=0.003 use_variable_thickness=true min_thickness=0.001 [m]
        max_thickness=0.01 [m] scale_factors=(1 1 1)
    Smith2018ContactMesh femur_cartilage: socket_frame=/bodyset/femur_distal_r location=(0 0 0)
        mesh_file=lenhart2015-R-femur-cartilage.stl mesh_back_file=lenhart2015-R-femur-bone.stl
    Smith2018ContactMesh tibia_cartilage: socket_frame=/bodyset/tibia_proximal_r location=(0 0 0)
        mesh_file=lenhart2015-R-tibia-cartilage.stl mesh_back_file=lenhart2015-R-tibia-bone.stl
    Smith2018ContactMesh patella_cartilage: socket_frame=/bodyset/patella_r location=(0 0 0)
        mesh_file=lenhart2015-R-patella-cartilage.stl mesh_back_file=lenhart2015-R-patella-bone.stl
    Smith2018ContactMesh femur_cartilage_l: socket_frame=/bodyset/femur_distal_l location=(0 0 0)
        mesh_file=lenhart2015-L-femur-cartilage.stl mesh_back_file=lenhart2015-R-femur-bone.stl
    Smith2018ContactMesh tibia_cartilage_l: socket_frame=/bodyset/tibia_proximal_l location=(0 0 0)
        mesh_file=lenhart2015-L-tibia-cartilage.stl mesh_back_file=lenhart2015-R-tibia-bone.stl
    Smith2018ContactMesh patella_cartilage_l: socket_frame=/bodyset/patella_l location=(0 0 0)
        mesh_file=lenhart2015-L-patella-cartilage.stl mesh_back_file=lenhart2015-R-patella-bone.stl
